// SBML level 2 version 4

model untitled()

  // Compartments:
  compartment default = 1 volume;

  // Species:
  species Insulin in default = 1.53/default;
  species Insulin_Receptor in default = 1.53/default;
  species IL_6 in default = 0; IL_6 is "IL-6";
  species TNF in default = 0; TNF is "TNFα";
  species Inflammation in default = 0;
  species P38 in default = 0;
  species PTEN in default = 0;
  species s69 in default = 1.66/default; s69 is "IRS-1";
  species s12 in default = 1.66/default; s12 is "IRS-1";
  species Oxidative_stress in default = 0;
  species ROS in default = 0;
  species Cell_death in default = 0;
  species AKT in default = 1.4/default;
  species PI3K in default = 1.36/default;
  species IRS1 in default = 1.36/default;
  species Glucose_uptake in default = 1.4/default;
  species s71 in default = 0; s71 is "JNK";
  species s72 in default = 0; s72 is "JNK";
  species NO in default = 0;
  species Infection in default = 0;
  species iNOS in default = 0;

  // Reactions:
  re2: Inflammation => IL_6; (vmaf_re2/kmc_re2_s32*Inflammation*default - vmar_re2/kmc_re2_s34*IL_6*default)/(1 + Inflammation*default/kmc_re2_s32 + IL_6*default/kmc_re2_s34);
    vmaf_re2 = 1 mole_per_second; kmc_re2_s32 = 1 substance; vmar_re2 = 1 mole_per_second; kmc_re2_s34 = 1 substance;
  re3: Inflammation => TNF; (vmaf_re3/kmc_re3_s32*Inflammation*default - vmar_re3/kmc_re3_s35*TNF*default)/(1 + Inflammation*default/kmc_re3_s32 + TNF*default/kmc_re3_s35);
    vmaf_re3 = 1 mole_per_second; kmc_re3_s32 = 1 substance; vmar_re3 = 1 mole_per_second; kmc_re3_s35 = 1 substance;
  re4: Inflammation => ROS; (vmaf_re4/kmc_re4_s32*Inflammation*default - vmar_re4/kmc_re4_s36*ROS*default)/(1 + Inflammation*default/kmc_re4_s32 + ROS*default/kmc_re4_s36);
    vmaf_re4 = 1 mole_per_second; kmc_re4_s32 = 1 substance; vmar_re4 = 1 mole_per_second; kmc_re4_s36 = 1 substance;
  re5: ROS => Oxidative_stress; (vmaf_re5/kmc_re5_s36*ROS*default - vmar_re5/kmc_re5_s37*Oxidative_stress*default)/(1 + ROS*default/kmc_re5_s36 + Oxidative_stress*default/kmc_re5_s37);
    vmaf_re5 = 1 mole_per_second; kmc_re5_s36 = 1 substance; vmar_re5 = 1 mole_per_second; kmc_re5_s37 = 1 substance;
  re6: Insulin_Receptor => Insulin; (vmaf_re6/kmc_re6_s47*Insulin_Receptor*default - vmar_re6/kmc_re6_s46*Insulin*default)/(1 + Inflammation*default/kic_1_re6_s32 + (Insulin_Receptor*default/kmc_re6_s47 + Insulin*default/kmc_re6_s46)*(1 + Inflammation*default/kic_2_re6_s32));  // modifiers: Inflammation
    vmaf_re6 = 1 mole_per_second; kmc_re6_s47 = 1 substance; vmar_re6 = 1 mole_per_second; kmc_re6_s46 = 1 substance; kic_1_re6_s32 = 1 substance; kic_2_re6_s32 = 1 substance;
  re7: Insulin_Receptor => IRS1; (vmaf_re7/kmc_re7_s47*Insulin_Receptor*default - vmar_re7/kmc_re7_s55*IRS1*default)/(1 + Insulin_Receptor*default/kmc_re7_s47 + IRS1*default/kmc_re7_s55);
    vmaf_re7 = 1 mole_per_second; kmc_re7_s47 = 1 substance; vmar_re7 = 1 mole_per_second; kmc_re7_s55 = 1 substance;
  re8: IRS1 => PI3K; kic_re8_s1/(kic_re8_s1 + NO*default)*(kic_re8_s72/(kic_re8_s72 + s72*default))*((vmaf_re8/kmc_re8_s55*IRS1*default - vmar_re8/kmc_re8_s56*PI3K*default)/(1 + IRS1*default/kmc_re8_s55 + PI3K*default/kmc_re8_s56));  // modifiers: NO, s72
    vmaf_re8 = 1 mole_per_second; kmc_re8_s55 = 1 substance; vmar_re8 = 1 mole_per_second; kmc_re8_s56 = 1 substance; kic_re8_s1 = 1 substance; kic_re8_s72 = 1 substance;
  re9: PI3K => AKT; kic_re9_s34/(kic_re9_s34 + IL_6*default)*kic_re9_s36/(kic_re9_s36 + ROS*default)*kic_re9_s82/(kic_re9_s82 + PTEN*default)*(kic_re9_s1/(kic_re9_s1 + NO*default))*((vmaf_re9/kmc_re9_s56*PI3K*default - vmar_re9/kmc_re9_s57*AKT*default)/(1 + PI3K*default/kmc_re9_s56 + AKT*default/kmc_re9_s57));  // modifiers: IL_6, PTEN, NO, ROS
    vmaf_re9 = 1 mole_per_second; kmc_re9_s56 = 1 substance; vmar_re9 = 1 mole_per_second; kmc_re9_s57 = 1 substance; kic_re9_s34 = 1 substance; kic_re9_s82 = 1 substance; kic_re9_s1 = 1 substance; kic_re9_s36 = 1 substance;
  re10: s12 => s69; (vmaf_re10/kmc_re10_s12*s12*default - vmar_re10/kmc_re10_s69*s69*default)/(1 + s12*default/kmc_re10_s12 + s69*default/kmc_re10_s69);
    vmaf_re10 = 1 mole_per_second; kmc_re10_s12 = 1 substance; vmar_re10 = 1 mole_per_second; kmc_re10_s69 = 1 substance;
  re11: IRS1 => s12; (vmaf_re11/kmc_re11_s55*IRS1*default - vmar_re11/kmc_re11_s12*s12*default)/(1 + NO*default/kic_1_re11_s1 + (IRS1*default/kmc_re11_s55 + s12*default/kmc_re11_s12)*(1 + NO*default/kic_2_re11_s1));  // modifiers: NO
    vmaf_re11 = 1 mole_per_second; kmc_re11_s55 = 1 substance; vmar_re11 = 1 mole_per_second; kmc_re11_s12 = 1 substance; kic_1_re11_s1 = 1 substance; kic_2_re11_s1 = 1 substance;
  re12: TNF => s12; (vmaf_re12/kmc_re12_s35*TNF*default - vmar_re12/kmc_re12_s12*s12*default)/(1 + TNF*default/kmc_re12_s35 + s12*default/kmc_re12_s12);
    vmaf_re12 = 1 mole_per_second; kmc_re12_s35 = 1 substance; vmar_re12 = 1 mole_per_second; kmc_re12_s12 = 1 substance;
  re13: IL_6 => s12; (vmaf_re13/kmc_re13_s34*IL_6*default - vmar_re13/kmc_re13_s12*s12*default)/(1 + IL_6*default/kmc_re13_s34 + s12*default/kmc_re13_s12);
    vmaf_re13 = 1 mole_per_second; kmc_re13_s34 = 1 substance; vmar_re13 = 1 mole_per_second; kmc_re13_s12 = 1 substance;
  re14: Oxidative_stress => Cell_death; (vmaf_re14/kmc_re14_s37*Oxidative_stress*default - vmar_re14/kmc_re14_s74*Cell_death*default)/(1 + Oxidative_stress*default/kmc_re14_s37 + Cell_death*default/kmc_re14_s74);
    vmaf_re14 = 1 mole_per_second; kmc_re14_s37 = 1 substance; vmar_re14 = 1 mole_per_second; kmc_re14_s74 = 1 substance;
  re15: AKT => Glucose_uptake; kic_re15_s36/(kic_re15_s36 + ROS*default)*(kic_re15_s72/(kic_re15_s72 + s72*default))*((vmaf_re15/kmc_re15_s57*AKT*default - vmar_re15/kmc_re15_s75*Glucose_uptake*default)/(1 + AKT*default/kmc_re15_s57 + Glucose_uptake*default/kmc_re15_s75));  // modifiers: ROS, s72
    vmaf_re15 = 1 mole_per_second; kmc_re15_s57 = 1 substance; vmar_re15 = 1 mole_per_second; kmc_re15_s75 = 1 substance; kic_re15_s36 = 1 substance; kic_re15_s72 = 1 substance;
  re16: P38 => PTEN; (vmaf_re16/kmc_re16_s81*P38*default - vmar_re16/kmc_re16_s82*PTEN*default)/(1 + P38*default/kmc_re16_s81 + PTEN*default/kmc_re16_s82);
    vmaf_re16 = 1 mole_per_second; kmc_re16_s81 = 1 substance; vmar_re16 = 1 mole_per_second; kmc_re16_s82 = 1 substance;
  re17: ROS => P38; (vmaf_re17/kmc_re17_s36*ROS*default - vmar_re17/kmc_re17_s81*P38*default)/(1 + ROS*default/kmc_re17_s36 + P38*default/kmc_re17_s81);
    vmaf_re17 = 1 mole_per_second; kmc_re17_s36 = 1 substance; vmar_re17 = 1 mole_per_second; kmc_re17_s81 = 1 substance;
  re18: s71 => s72; (vmaf_re18/kmc_re18_s71*s71*default - vmar_re18/kmc_re18_s72*s72*default)/(1 + ROS*default/kic_1_re18_s36 + (s71*default/kmc_re18_s71 + s72*default/kmc_re18_s72)*(1 + ROS*default/kic_2_re18_s36));  // modifiers: ROS
    vmaf_re18 = 1 mole_per_second; kmc_re18_s71 = 1 substance; vmar_re18 = 1 mole_per_second; kmc_re18_s72 = 1 substance; kic_1_re18_s36 = 1 substance; kic_2_re18_s36 = 1 substance;
  re19: TNF => s72; (vmaf_re19/kmc_re19_s35*TNF*default - vmar_re19/kmc_re19_s72*s72*default)/(1 + TNF*default/kmc_re19_s35 + s72*default/kmc_re19_s72);
    vmaf_re19 = 1 mole_per_second; kmc_re19_s35 = 1 substance; vmar_re19 = 1 mole_per_second; kmc_re19_s72 = 1 substance;
  re21: Infection => Inflammation; (vmaf_re21/kmc_re21_s3*Infection*default - vmar_re21/kmc_re21_s32*Inflammation*default)/(1 + Infection*default/kmc_re21_s3 + Inflammation*default/kmc_re21_s32);
    vmaf_re21 = 1 mole_per_second; kmc_re21_s3 = 1 substance; vmar_re21 = 1 mole_per_second; kmc_re21_s32 = 1 substance;
  re22: Infection => IL_6; (vmaf_re22/kmc_re22_s3*Infection*default - vmar_re22/kmc_re22_s34*IL_6*default)/(1 + Infection*default/kmc_re22_s3 + IL_6*default/kmc_re22_s34);
    vmaf_re22 = 1 mole_per_second; kmc_re22_s3 = 1 substance; vmar_re22 = 1 mole_per_second; kmc_re22_s34 = 1 substance;
  re23: Infection => TNF; (vmaf_re23/kmc_re23_s3*Infection*default - vmar_re23/kmc_re23_s35*TNF*default)/(1 + Infection*default/kmc_re23_s3 + TNF*default/kmc_re23_s35);
    vmaf_re23 = 1 mole_per_second; kmc_re23_s3 = 1 substance; vmar_re23 = 1 mole_per_second; kmc_re23_s35 = 1 substance;
  re24: iNOS => NO; (vmaf_re24/kmc_re24_s83*iNOS*default - vmar_re24/kmc_re24_s1*NO*default)/(1 + iNOS*default/kmc_re24_s83 + NO*default/kmc_re24_s1);
    vmaf_re24 = 1 mole_per_second; kmc_re24_s83 = 1 substance; vmar_re24 = 1 mole_per_second; kmc_re24_s1 = 1 substance;
  re25: TNF => iNOS; (vmaf_re25/kmc_re25_s35*TNF*default - vmar_re25/kmc_re25_s83*iNOS*default)/(1 + TNF*default/kmc_re25_s35 + iNOS*default/kmc_re25_s83);
    vmaf_re25 = 1 mole_per_second; kmc_re25_s35 = 1 substance; vmar_re25 = 1 mole_per_second; kmc_re25_s83 = 1 substance;

  // Unit definitions:
  unit substance = mole;
  unit volume = litre;
  unit area = metre^2;
  unit length = metre;
  unit time = second;
  unit mole_per_second = mole / second;
end
