// SBML level 2 version 4

model Cytokine_storm()

  // Compartments:
  compartment default = 1 volume;

  // Species:
  substanceOnly species type_2_pneumocytes in default = 0;
  substanceOnly species IL_1 in default = 0; IL_1 is "IL-1β";
  substanceOnly species IL_6 in default = 0; IL_6 is "IL-6";
  substanceOnly species TNF in default = 0; TNF is "TNFα";
  substanceOnly species NLRP3 in default = 0.01;
  substanceOnly species T_cells in default = 0;
  substanceOnly species Macrophage in default = 0;
  substanceOnly species Neutrophills in default = 0;
  substanceOnly species IFN in default = 0.06; IFN is "IFNγ";
  species Cytokine_Storm in default = 0;
  substanceOnly species IL_2 in default = 0.01; IL_2 is "IL-2";
  substanceOnly species MCP_1 in default = 0.1; MCP_1 is "MCP-1";
  substanceOnly species DAMPs in default = 0.01;
  substanceOnly species IL_18 in default = 0.09; IL_18 is "IL-18";
  substanceOnly species Degradation in default = 0;
  substanceOnly species TLR in default = 0.01;
  substanceOnly species NFkB in default = 0;
  substanceOnly species Dendritic_cells in default = 0;
  species IL_12 in default = 0; IL_12 is "IL-12";
  species ROS in default = 0;
  substanceOnly species IL_21 in default = 0.02; IL_21 is "IL-21";
  substanceOnly species NK_cells in default = 0.01;
  substanceOnly species PPRs in default = 0;
  species Multi_Organ_Failure in default = 0; Multi_Organ_Failure is "Multi-Organ Failure";
  substanceOnly species PI3K in default = 0;
  species AKT in default = 0;

  // Reactions:
  re80: type_2_pneumocytes => Degradation; (vmaf_re80/kmc_re80_s30*type_2_pneumocytes*default - vmar_re80/kmc_re80_s1*Degradation*default)/(1 + type_2_pneumocytes*default/kmc_re80_s30 + Degradation*default/kmc_re80_s1);
    vmaf_re80 = 1 mole_per_second; kmc_re80_s30 = 1 substance; vmar_re80 = 1 mole_per_second; kmc_re80_s1 = 1 substance;
  re81: Degradation => DAMPs; (vmaf_re81/kmc_re81_s1*Degradation*default - vmar_re81/kmc_re81_s96*DAMPs*default)/(1 + Degradation*default/kmc_re81_s1 + DAMPs*default/kmc_re81_s96);
    vmaf_re81 = 1 mole_per_second; kmc_re81_s1 = 1 substance; vmar_re81 = 1 mole_per_second; kmc_re81_s96 = 1 substance;
  re82: DAMPs => T_cells; (vmaf_re82/kmc_re82_s96*DAMPs*default - vmar_re82/kmc_re82_s86*T_cells*default)/(1 + DAMPs*default/kmc_re82_s96 + T_cells*default/kmc_re82_s86);
    vmaf_re82 = 1 mole_per_second; kmc_re82_s96 = 1 substance; vmar_re82 = 1 mole_per_second; kmc_re82_s86 = 1 substance;
  re83: DAMPs => Dendritic_cells; (vmaf_re83/kmc_re83_s96*DAMPs*default - vmar_re83/kmc_re83_s2*Dendritic_cells*default)/(1 + DAMPs*default/kmc_re83_s96 + Dendritic_cells*default/kmc_re83_s2);
    vmaf_re83 = 1 mole_per_second; kmc_re83_s96 = 1 substance; vmar_re83 = 1 mole_per_second; kmc_re83_s2 = 1 substance;
  re84: DAMPs => Neutrophills; (vmaf_re84/kmc_re84_s96*DAMPs*default - vmar_re84/kmc_re84_s88*Neutrophills*default)/(1 + DAMPs*default/kmc_re84_s96 + Neutrophills*default/kmc_re84_s88);
    vmaf_re84 = 1 mole_per_second; kmc_re84_s96 = 1 substance; vmar_re84 = 1 mole_per_second; kmc_re84_s88 = 1 substance;
  re85: DAMPs => Macrophage; (vmaf_re85/kmc_re85_s96*DAMPs*default - vmar_re85/kmc_re85_s87*Macrophage*default)/(1 + DAMPs*default/kmc_re85_s96 + Macrophage*default/kmc_re85_s87);
    vmaf_re85 = 1 mole_per_second; kmc_re85_s96 = 1 substance; vmar_re85 = 1 mole_per_second; kmc_re85_s87 = 1 substance;
  re86: DAMPs => NLRP3; (vmaf_re86/kmc_re86_s96*DAMPs*default - vmar_re86/kmc_re86_s84*NLRP3*default)/(1 + DAMPs*default/kmc_re86_s96 + NLRP3*default/kmc_re86_s84);
    vmaf_re86 = 1 mole_per_second; kmc_re86_s96 = 1 substance; vmar_re86 = 1 mole_per_second; kmc_re86_s84 = 1 substance;
  re87: NLRP3 => IL_1; NFkB*default*(kcat_re87_s85*NLRP3*default/(kmc_re87_s84_s85 + NLRP3*default));  // modifiers: NFkB
    kcat_re87_s85 = 1 per_second; kmc_re87_s84_s85 = 1 substance;
  re88: NLRP3 => IL_18; (vmaf_re88/kmc_re88_s84*NLRP3*default - vmar_re88/kmc_re88_s101*IL_18*default)/(1 + NLRP3*default/kmc_re88_s84 + IL_18*default/kmc_re88_s101);
    vmaf_re88 = 1 mole_per_second; kmc_re88_s84 = 1 substance; vmar_re88 = 1 mole_per_second; kmc_re88_s101 = 1 substance;
  re89: DAMPs => TLR; (vmaf_re89/kmc_re89_s96*DAMPs*default - vmar_re89/kmc_re89_s97*TLR*default)/(1 + DAMPs*default/kmc_re89_s96 + TLR*default/kmc_re89_s97);
    vmaf_re89 = 1 mole_per_second; kmc_re89_s96 = 1 substance; vmar_re89 = 1 mole_per_second; kmc_re89_s97 = 1 substance;
  re90: T_cells => IL_1; (vmaf_re90/kmc_re90_s86*T_cells*default - vmar_re90/kmc_re90_s33*IL_1*default)/(1 + T_cells*default/kmc_re90_s86 + IL_1*default/kmc_re90_s33);
    vmaf_re90 = 1 mole_per_second; kmc_re90_s86 = 1 substance; vmar_re90 = 1 mole_per_second; kmc_re90_s33 = 1 substance;
  re91: T_cells => TNF; (vmaf_re91/kmc_re91_s86*T_cells*default - vmar_re91/kmc_re91_s35*TNF*default)/(1 + T_cells*default/kmc_re91_s86 + TNF*default/kmc_re91_s35);
    vmaf_re91 = 1 mole_per_second; kmc_re91_s86 = 1 substance; vmar_re91 = 1 mole_per_second; kmc_re91_s35 = 1 substance;
  re92: T_cells => IL_18; (vmaf_re92/kmc_re92_s86*T_cells*default - vmar_re92/kmc_re92_s101*IL_18*default)/(1 + T_cells*default/kmc_re92_s86 + IL_18*default/kmc_re92_s101);
    vmaf_re92 = 1 mole_per_second; kmc_re92_s86 = 1 substance; vmar_re92 = 1 mole_per_second; kmc_re92_s101 = 1 substance;
  re93: T_cells => IL_6; (vmaf_re93/kmc_re93_s86*T_cells*default - vmar_re93/kmc_re93_s34*IL_6*default)/(1 + T_cells*default/kmc_re93_s86 + IL_6*default/kmc_re93_s34);
    vmaf_re93 = 1 mole_per_second; kmc_re93_s86 = 1 substance; vmar_re93 = 1 mole_per_second; kmc_re93_s34 = 1 substance;
  re94: Macrophage => IL_1; (vmaf_re94/kmc_re94_s87*Macrophage*default - vmar_re94/kmc_re94_s33*IL_1*default)/(1 + Macrophage*default/kmc_re94_s87 + IL_1*default/kmc_re94_s33);
    vmaf_re94 = 1 mole_per_second; kmc_re94_s87 = 1 substance; vmar_re94 = 1 mole_per_second; kmc_re94_s33 = 1 substance;
  re95: Macrophage => IL_6; (vmaf_re95/kmc_re95_s87*Macrophage*default - vmar_re95/kmc_re95_s34*IL_6*default)/(1 + Macrophage*default/kmc_re95_s87 + IL_6*default/kmc_re95_s34);
    vmaf_re95 = 1 mole_per_second; kmc_re95_s87 = 1 substance; vmar_re95 = 1 mole_per_second; kmc_re95_s34 = 1 substance;
  re96: Macrophage => TNF; (vmaf_re96/kmc_re96_s87*Macrophage*default - vmar_re96/kmc_re96_s35*TNF*default)/(1 + Macrophage*default/kmc_re96_s87 + TNF*default/kmc_re96_s35);
    vmaf_re96 = 1 mole_per_second; kmc_re96_s87 = 1 substance; vmar_re96 = 1 mole_per_second; kmc_re96_s35 = 1 substance;
  re97: Dendritic_cells => IL_1; (vmaf_re97/kmc_re97_s2*Dendritic_cells*default - vmar_re97/kmc_re97_s33*IL_1*default)/(1 + Dendritic_cells*default/kmc_re97_s2 + IL_1*default/kmc_re97_s33);
    vmaf_re97 = 1 mole_per_second; kmc_re97_s2 = 1 substance; vmar_re97 = 1 mole_per_second; kmc_re97_s33 = 1 substance;
  re98: Dendritic_cells => IL_6; (vmaf_re98/kmc_re98_s2*Dendritic_cells*default - vmar_re98/kmc_re98_s34*IL_6*default)/(1 + Dendritic_cells*default/kmc_re98_s2 + IL_6*default/kmc_re98_s34);
    vmaf_re98 = 1 mole_per_second; kmc_re98_s2 = 1 substance; vmar_re98 = 1 mole_per_second; kmc_re98_s34 = 1 substance;
  re99: Dendritic_cells => TNF; (vmaf_re99/kmc_re99_s2*Dendritic_cells*default - vmar_re99/kmc_re99_s35*TNF*default)/(1 + Dendritic_cells*default/kmc_re99_s2 + TNF*default/kmc_re99_s35);
    vmaf_re99 = 1 mole_per_second; kmc_re99_s2 = 1 substance; vmar_re99 = 1 mole_per_second; kmc_re99_s35 = 1 substance;
  re100: Neutrophills => TNF; (vmaf_re100/kmc_re100_s88*Neutrophills*default - vmar_re100/kmc_re100_s35*TNF*default)/(1 + Neutrophills*default/kmc_re100_s88 + TNF*default/kmc_re100_s35);
    vmaf_re100 = 1 mole_per_second; kmc_re100_s88 = 1 substance; vmar_re100 = 1 mole_per_second; kmc_re100_s35 = 1 substance;
  re101: Neutrophills => IL_1; (vmaf_re101/kmc_re101_s88*Neutrophills*default - vmar_re101/kmc_re101_s33*IL_1*default)/(1 + Neutrophills*default/kmc_re101_s88 + IL_1*default/kmc_re101_s33);
    vmaf_re101 = 1 mole_per_second; kmc_re101_s88 = 1 substance; vmar_re101 = 1 mole_per_second; kmc_re101_s33 = 1 substance;
  re102: Neutrophills => IL_12; (vmaf_re102/kmc_re102_s88*Neutrophills*default - vmar_re102/kmc_re102_s3*IL_12*default)/(1 + Neutrophills*default/kmc_re102_s88 + IL_12*default/kmc_re102_s3);
    vmaf_re102 = 1 mole_per_second; kmc_re102_s88 = 1 substance; vmar_re102 = 1 mole_per_second; kmc_re102_s3 = 1 substance;
  re103: Neutrophills => MCP_1; (vmaf_re103/kmc_re103_s88*Neutrophills*default - vmar_re103/kmc_re103_s94*MCP_1*default)/(1 + Neutrophills*default/kmc_re103_s88 + MCP_1*default/kmc_re103_s94);
    vmaf_re103 = 1 mole_per_second; kmc_re103_s88 = 1 substance; vmar_re103 = 1 mole_per_second; kmc_re103_s94 = 1 substance;
  re104: Dendritic_cells => IL_12; (vmaf_re104/kmc_re104_s2*Dendritic_cells*default - vmar_re104/kmc_re104_s3*IL_12*default)/(1 + Dendritic_cells*default/kmc_re104_s2 + IL_12*default/kmc_re104_s3);
    vmaf_re104 = 1 mole_per_second; kmc_re104_s2 = 1 substance; vmar_re104 = 1 mole_per_second; kmc_re104_s3 = 1 substance;
  re105: Macrophage => IL_12; (vmaf_re105/kmc_re105_s87*Macrophage*default - vmar_re105/kmc_re105_s3*IL_12*default)/(1 + Macrophage*default/kmc_re105_s87 + IL_12*default/kmc_re105_s3);
    vmaf_re105 = 1 mole_per_second; kmc_re105_s87 = 1 substance; vmar_re105 = 1 mole_per_second; kmc_re105_s3 = 1 substance;
  re106: T_cells => IL_2; (vmaf_re106/kmc_re106_s86*T_cells*default - vmar_re106/kmc_re106_s93*IL_2*default)/(1 + T_cells*default/kmc_re106_s86 + IL_2*default/kmc_re106_s93);
    vmaf_re106 = 1 mole_per_second; kmc_re106_s86 = 1 substance; vmar_re106 = 1 mole_per_second; kmc_re106_s93 = 1 substance;
  re107: T_cells => IFN; (vmaf_re107/kmc_re107_s86*T_cells*default - vmar_re107/kmc_re107_s89*IFN*default)/(1 + T_cells*default/kmc_re107_s86 + IFN*default/kmc_re107_s89);
    vmaf_re107 = 1 mole_per_second; kmc_re107_s86 = 1 substance; vmar_re107 = 1 mole_per_second; kmc_re107_s89 = 1 substance;
  re108: NFkB => TNF; (vmaf_re108/kmc_re108_s85*NFkB*default - vmar_re108/kmc_re108_s35*TNF*default)/(1 + NFkB*default/kmc_re108_s85 + TNF*default/kmc_re108_s35);
    vmaf_re108 = 1 mole_per_second; kmc_re108_s85 = 1 substance; vmar_re108 = 1 mole_per_second; kmc_re108_s35 = 1 substance;
  re109: NFkB => IL_1; (vmaf_re109/kmc_re109_s85*NFkB*default - vmar_re109/kmc_re109_s33*IL_1*default)/(1 + NFkB*default/kmc_re109_s85 + IL_1*default/kmc_re109_s33);
    vmaf_re109 = 1 mole_per_second; kmc_re109_s85 = 1 substance; vmar_re109 = 1 mole_per_second; kmc_re109_s33 = 1 substance;
  re110: NFkB => IL_2; (vmaf_re110/kmc_re110_s85*NFkB*default - vmar_re110/kmc_re110_s93*IL_2*default)/(1 + NFkB*default/kmc_re110_s85 + IL_2*default/kmc_re110_s93);
    vmaf_re110 = 1 mole_per_second; kmc_re110_s85 = 1 substance; vmar_re110 = 1 mole_per_second; kmc_re110_s93 = 1 substance;
  re111: NFkB => IFN; (vmaf_re111/kmc_re111_s85*NFkB*default - vmar_re111/kmc_re111_s89*IFN*default)/(1 + NFkB*default/kmc_re111_s85 + IFN*default/kmc_re111_s89);
    vmaf_re111 = 1 mole_per_second; kmc_re111_s85 = 1 substance; vmar_re111 = 1 mole_per_second; kmc_re111_s89 = 1 substance;
  re112: NFkB => IL_12; (vmaf_re112/kmc_re112_s85*NFkB*default - vmar_re112/kmc_re112_s3*IL_12*default)/(1 + NFkB*default/kmc_re112_s85 + IL_12*default/kmc_re112_s3);
    vmaf_re112 = 1 mole_per_second; kmc_re112_s85 = 1 substance; vmar_re112 = 1 mole_per_second; kmc_re112_s3 = 1 substance;
  re113: TLR => NFkB; (vmaf_re113/kmc_re113_s97*TLR*default - vmar_re113/kmc_re113_s85*NFkB*default)/(1 + TLR*default/kmc_re113_s97 + NFkB*default/kmc_re113_s85);
    vmaf_re113 = 1 mole_per_second; kmc_re113_s97 = 1 substance; vmar_re113 = 1 mole_per_second; kmc_re113_s85 = 1 substance;
  re114: Degradation => ROS; (vmaf_re114/kmc_re114_s1*Degradation*default - vmar_re114/kmc_re114_s6*ROS*default)/(1 + Degradation*default/kmc_re114_s1 + ROS*default/kmc_re114_s6);
    vmaf_re114 = 1 mole_per_second; kmc_re114_s1 = 1 substance; vmar_re114 = 1 mole_per_second; kmc_re114_s6 = 1 substance;
  re115: ROS => NFkB; (vmaf_re115/kmc_re115_s6*ROS*default - vmar_re115/kmc_re115_s85*NFkB*default)/(1 + ROS*default/kmc_re115_s6 + NFkB*default/kmc_re115_s85);
    vmaf_re115 = 1 mole_per_second; kmc_re115_s6 = 1 substance; vmar_re115 = 1 mole_per_second; kmc_re115_s85 = 1 substance;
  re116: T_cells => MCP_1; (vmaf_re116/kmc_re116_s86*T_cells*default - vmar_re116/kmc_re116_s94*MCP_1*default)/(1 + T_cells*default/kmc_re116_s86 + MCP_1*default/kmc_re116_s94);
    vmaf_re116 = 1 mole_per_second; kmc_re116_s86 = 1 substance; vmar_re116 = 1 mole_per_second; kmc_re116_s94 = 1 substance;
  re117: T_cells => IL_21; (vmaf_re117/kmc_re117_s86*T_cells*default - vmar_re117/kmc_re117_s102*IL_21*default)/(1 + T_cells*default/kmc_re117_s86 + IL_21*default/kmc_re117_s102);
    vmaf_re117 = 1 mole_per_second; kmc_re117_s86 = 1 substance; vmar_re117 = 1 mole_per_second; kmc_re117_s102 = 1 substance;
  re118: NFkB => MCP_1; (vmaf_re118/kmc_re118_s85*NFkB*default - vmar_re118/kmc_re118_s94*MCP_1*default)/(1 + NFkB*default/kmc_re118_s85 + MCP_1*default/kmc_re118_s94);
    vmaf_re118 = 1 mole_per_second; kmc_re118_s85 = 1 substance; vmar_re118 = 1 mole_per_second; kmc_re118_s94 = 1 substance;
  re119: NFkB => IL_18; (vmaf_re119/kmc_re119_s85*NFkB*default - vmar_re119/kmc_re119_s101*IL_18*default)/(1 + NFkB*default/kmc_re119_s85 + IL_18*default/kmc_re119_s101);
    vmaf_re119 = 1 mole_per_second; kmc_re119_s85 = 1 substance; vmar_re119 = 1 mole_per_second; kmc_re119_s101 = 1 substance;
  re120: TNF => NFkB; (vmaf_re120/kmc_re120_s35*TNF*default - vmar_re120/kmc_re120_s85*NFkB*default)/(1 + TNF*default/kmc_re120_s35 + NFkB*default/kmc_re120_s85);
    vmaf_re120 = 1 mole_per_second; kmc_re120_s35 = 1 substance; vmar_re120 = 1 mole_per_second; kmc_re120_s85 = 1 substance;
  re121: IL_1 => NFkB; (vmaf_re121/kmc_re121_s33*IL_1*default - vmar_re121/kmc_re121_s85*NFkB*default)/(1 + IL_1*default/kmc_re121_s33 + NFkB*default/kmc_re121_s85);
    vmaf_re121 = 1 mole_per_second; kmc_re121_s33 = 1 substance; vmar_re121 = 1 mole_per_second; kmc_re121_s85 = 1 substance;
  re123: NK_cells => Dendritic_cells; (vmaf_re123/kmc_re123_s103*NK_cells*default - vmar_re123/kmc_re123_s2*Dendritic_cells*default)/(1 + NK_cells*default/kmc_re123_s103 + Dendritic_cells*default/kmc_re123_s2);
    vmaf_re123 = 1 mole_per_second; kmc_re123_s103 = 1 substance; vmar_re123 = 1 mole_per_second; kmc_re123_s2 = 1 substance;
  re124: NK_cells => Macrophage; (vmaf_re124/kmc_re124_s103*NK_cells*default - vmar_re124/kmc_re124_s87*Macrophage*default)/(1 + NK_cells*default/kmc_re124_s103 + Macrophage*default/kmc_re124_s87);
    vmaf_re124 = 1 mole_per_second; kmc_re124_s103 = 1 substance; vmar_re124 = 1 mole_per_second; kmc_re124_s87 = 1 substance;
  re125: NK_cells => T_cells; (vmaf_re125/kmc_re125_s103*NK_cells*default - vmar_re125/kmc_re125_s86*T_cells*default)/(1 + NK_cells*default/kmc_re125_s103 + T_cells*default/kmc_re125_s86);
    vmaf_re125 = 1 mole_per_second; kmc_re125_s103 = 1 substance; vmar_re125 = 1 mole_per_second; kmc_re125_s86 = 1 substance;
  re126: IL_12 => NK_cells; (vmaf_re126/kmc_re126_s3*IL_12*default - vmar_re126/kmc_re126_s103*NK_cells*default)/(1 + IL_12*default/kmc_re126_s3 + NK_cells*default/kmc_re126_s103);
    vmaf_re126 = 1 mole_per_second; kmc_re126_s3 = 1 substance; vmar_re126 = 1 mole_per_second; kmc_re126_s103 = 1 substance;
  re127: IL_18 => NK_cells; (vmaf_re127/kmc_re127_s101*IL_18*default - vmar_re127/kmc_re127_s103*NK_cells*default)/(1 + IL_18*default/kmc_re127_s101 + NK_cells*default/kmc_re127_s103);
    vmaf_re127 = 1 mole_per_second; kmc_re127_s101 = 1 substance; vmar_re127 = 1 mole_per_second; kmc_re127_s103 = 1 substance;
  re128: IL_2 => NK_cells; (vmaf_re128/kmc_re128_s93*IL_2*default - vmar_re128/kmc_re128_s103*NK_cells*default)/(1 + IL_2*default/kmc_re128_s93 + NK_cells*default/kmc_re128_s103);
    vmaf_re128 = 1 mole_per_second; kmc_re128_s93 = 1 substance; vmar_re128 = 1 mole_per_second; kmc_re128_s103 = 1 substance;
  re129: NK_cells => IFN; (vmaf_re129/kmc_re129_s103*NK_cells*default - vmar_re129/kmc_re129_s89*IFN*default)/(1 + NK_cells*default/kmc_re129_s103 + IFN*default/kmc_re129_s89);
    vmaf_re129 = 1 mole_per_second; kmc_re129_s103 = 1 substance; vmar_re129 = 1 mole_per_second; kmc_re129_s89 = 1 substance;
  re130: IFN => Macrophage; (vmaf_re130/kmc_re130_s89*IFN*default - vmar_re130/kmc_re130_s87*Macrophage*default)/(1 + IFN*default/kmc_re130_s89 + Macrophage*default/kmc_re130_s87);
    vmaf_re130 = 1 mole_per_second; kmc_re130_s89 = 1 substance; vmar_re130 = 1 mole_per_second; kmc_re130_s87 = 1 substance;
  re131: NK_cells => TNF; (vmaf_re131/kmc_re131_s103*NK_cells*default - vmar_re131/kmc_re131_s35*TNF*default)/(1 + NK_cells*default/kmc_re131_s103 + TNF*default/kmc_re131_s35);
    vmaf_re131 = 1 mole_per_second; kmc_re131_s103 = 1 substance; vmar_re131 = 1 mole_per_second; kmc_re131_s35 = 1 substance;
  re132: TNF => Macrophage; (vmaf_re132/kmc_re132_s35*TNF*default - vmar_re132/kmc_re132_s87*Macrophage*default)/(1 + TNF*default/kmc_re132_s35 + Macrophage*default/kmc_re132_s87);
    vmaf_re132 = 1 mole_per_second; kmc_re132_s35 = 1 substance; vmar_re132 = 1 mole_per_second; kmc_re132_s87 = 1 substance;
  re133: IFN => Dendritic_cells; (vmaf_re133/kmc_re133_s89*IFN*default - vmar_re133/kmc_re133_s2*Dendritic_cells*default)/(1 + IFN*default/kmc_re133_s89 + Dendritic_cells*default/kmc_re133_s2);
    vmaf_re133 = 1 mole_per_second; kmc_re133_s89 = 1 substance; vmar_re133 = 1 mole_per_second; kmc_re133_s2 = 1 substance;
  re134: IFN => T_cells; (vmaf_re134/kmc_re134_s89*IFN*default - vmar_re134/kmc_re134_s86*T_cells*default)/(1 + IFN*default/kmc_re134_s89 + T_cells*default/kmc_re134_s86);
    vmaf_re134 = 1 mole_per_second; kmc_re134_s89 = 1 substance; vmar_re134 = 1 mole_per_second; kmc_re134_s86 = 1 substance;
  re142: PPRs => NFkB; (vmaf_re142/kmc_re142_s104*PPRs*default - vmar_re142/kmc_re142_s85*NFkB*default)/(1 + PPRs*default/kmc_re142_s104 + NFkB*default/kmc_re142_s85);
    vmaf_re142 = 1 mole_per_second; kmc_re142_s104 = 1 substance; vmar_re142 = 1 mole_per_second; kmc_re142_s85 = 1 substance;
  re143: IL_6 => NFkB; (vmaf_re143/kmc_re143_s34*IL_6*default - vmar_re143/kmc_re143_s85*NFkB*default)/(1 + IL_6*default/kmc_re143_s34 + NFkB*default/kmc_re143_s85);
    vmaf_re143 = 1 mole_per_second; kmc_re143_s34 = 1 substance; vmar_re143 = 1 mole_per_second; kmc_re143_s85 = 1 substance;
  re144: IL_6 + IFN + TNF + IL_1 + IL_12 + IL_2 + IL_18 + MCP_1 => Cytokine_Storm; (vmaf_re144*(IL_6*default/kmc_re144_s34)^hco_re144*(IFN*default/kmc_re144_s89)^hco_re144*(TNF*default/kmc_re144_s35)^hco_re144*(IL_1*default/kmc_re144_s33)^hco_re144*(IL_12*default/kmc_re144_s3)^hco_re144*(IL_2*default/kmc_re144_s93)^hco_re144*(IL_18*default/kmc_re144_s101)^hco_re144*(MCP_1*default/kmc_re144_s94)^hco_re144 - vmar_re144*(Cytokine_Storm*default/kmc_re144_s90)^hco_re144)/((1 + IL_6*default/kmc_re144_s34)^hco_re144*(1 + IFN*default/kmc_re144_s89)^hco_re144*(1 + TNF*default/kmc_re144_s35)^hco_re144*(1 + IL_1*default/kmc_re144_s33)^hco_re144*(1 + IL_12*default/kmc_re144_s3)^hco_re144*(1 + IL_2*default/kmc_re144_s93)^hco_re144*(1 + IL_18*default/kmc_re144_s101)^hco_re144*(1 + MCP_1*default/kmc_re144_s94)^hco_re144 + (1 + Cytokine_Storm*default/kmc_re144_s90)^hco_re144 - 1);
    vmaf_re144 = 1 mole_per_second; hco_re144 = 1 dimensionless; kmc_re144_s34 = 1 substance; kmc_re144_s89 = 1 substance; kmc_re144_s35 = 1 substance; kmc_re144_s33 = 1 substance; kmc_re144_s3 = 1 substance; kmc_re144_s93 = 1 substance; kmc_re144_s101 = 1 substance; kmc_re144_s94 = 1 substance; vmar_re144 = 1 mole_per_second; kmc_re144_s90 = 1 substance;
  re145: Cytokine_Storm => Multi_Organ_Failure; (vmaf_re145/kmc_re145_s90*Cytokine_Storm*default - vmar_re145/kmc_re145_s4*Multi_Organ_Failure*default)/(1 + Cytokine_Storm*default/kmc_re145_s90 + Multi_Organ_Failure*default/kmc_re145_s4);
    vmaf_re145 = 1 mole_per_second; kmc_re145_s90 = 1 substance; vmar_re145 = 1 mole_per_second; kmc_re145_s4 = 1 substance;
  re146: PI3K => AKT; (vmaf_re146/kmc_re146_s98*PI3K*default - vmar_re146/kmc_re146_s99*AKT*default)/(1 + PI3K*default/kmc_re146_s98 + AKT*default/kmc_re146_s99);
    vmaf_re146 = 1 mole_per_second; kmc_re146_s98 = 1 substance; vmar_re146 = 1 mole_per_second; kmc_re146_s99 = 1 substance;
  re147: AKT => NFkB; (vmaf_re147/kmc_re147_s99*AKT*default - vmar_re147/kmc_re147_s85*NFkB*default)/(1 + AKT*default/kmc_re147_s99 + NFkB*default/kmc_re147_s85);
    vmaf_re147 = 1 mole_per_second; kmc_re147_s99 = 1 substance; vmar_re147 = 1 mole_per_second; kmc_re147_s85 = 1 substance;

  // Unit definitions:
  unit substance = mole;
  unit volume = litre;
  unit area = metre^2;
  unit length = metre;
  unit time = second;
  unit mole_per_second = mole / second;
  unit per_second = 1 / second;
end
