// SBML level 2 version 4

model NO()

  // Compartments:
  compartment default = 1 volume;

  // Species:
  species NO in default = 0;
  species NOS in default = 0;
  species Stat_1 in default = 0; Stat_1 is "Stat-1";
  species L_Arg in default = 0.31/default; L_Arg is "L-Arg";
  species L_Citrulline in default = 0.23/default; L_Citrulline is "L-Citrulline";
  species NFKB in default = 0;
  species IFN in default = 0; IFN is "IFNγ";
  species TNF in default = 0; TNF is "TNFα";
  species IL_1 in default = 0; IL_1 is "IL-1β";
  species IL_10 in default = 0; IL_10 is "IL-10";
  species IL_12 in default = 0; IL_12 is "IL-12";
  species MIF in default = 0;
  species IRF_1 in default = 0; IRF_1 is "IRF-1";
  species PKR in default = 0;
  species NO2 in default = 0; NO2 is "NO2-";
  species Macrophages in default = 0;
  species Dendritic_cells in default = 0;
  species IL_2 in default = 4.04/default; IL_2 is "IL-2";
  species NK_cells in default = 0.68/default;
  species Mast_cells in default = 0.64/default;
  species Neutrophils in default = 0.68/default;
  species Bcl_2 in default = 4.3/default; Bcl_2 is "Bcl-2";
  species High_NO in default = 0;
  species Low_NO in default = 0;
  species T_Cell in default = 0.196/default; T_Cell is "T-Cell";
  species T_cell_accumulation in default = 0; T_cell_accumulation is "T-cell accumulation";
  species P_selectin in default = 0; P_selectin is "P-selectin";
  species Lymphocytes in default = 0.89/default;
  species Lymphocyte_proliferation in default = 0;
  species IkB in default = 1/default;
  species IL_4 in default = 0; IL_4 is "IL-4";
  species VCAM_1 in default = 0; VCAM_1 is "VCAM-1";
  species Viral_infection in default = 0.55/default;
  species IL_5 in default = 0; IL_5 is "IL-5";
  species IL_6 in default = 0; IL_6 is "IL-6";
  species IL_13 in default = 0; IL_13 is "IL-13";
  species Eosinophils in default = 0.32/default;
  species Caspase_8 in default = 0; Caspase_8 is "Caspase-8";
  species procaspase_8 in default = 0; procaspase_8 is "procaspase-8";
  species Cytochrome_c in default = 1/default;
  species Bid in default = 1.09/default;
  species S_nitrosylated_Caspase in default = 0; S_nitrosylated_Caspase is "S-nitrosylated Caspase";
  species pro_IL_1 in default = 0; pro_IL_1 is "pro-IL-1β";
  species Mature_IL_1 in default = 0; Mature_IL_1 is "Mature IL-1β";
  species ICE in default = 0;
  species Caspase_1 in default = 0; Caspase_1 is "Caspase-1";
  species IL_18 in default = 0; IL_18 is "IL-18";
  species P53 in default = 0;
  species Bax in default = 0;
  species Caspase_3 in default = 0; Caspase_3 is "Caspase-3";
  species procaspase_9 in default = 0; procaspase_9 is "procaspase-9";
  species Caspase_9 in default = 0.11/default; Caspase_9 is "Caspase-9";
  species Apaf1 in default = 0;
  species Caspase_7 in default = 0;
  species Apoptosis in default = 0;
  species T_cell in default = 0;
  species PRRs in default = 0;
  species IRF_3 in default = 0; IRF_3 is "IRF-3";
  species IRF_7 in default = 0; IRF_7 is "IRF-7";

  // Reactions:
  re1: NOS + L_Arg => NO + L_Citrulline; (vmaf_re1/(kic_re1_s2*kmc_re1_s6)*NOS*default*L_Arg*default - vmar_re1/(kic_re1_s7*kmc_re1_s1)*NO*default*L_Citrulline*default)/(1 + NOS*default*L_Arg*default/(kic_re1_s2*kmc_re1_s6) + NOS*default/kic_re1_s2 + NO*default*L_Citrulline*default/(kic_re1_s7*kmc_re1_s1) + L_Arg*default/kic_re1_s6 + L_Citrulline*default/kic_re1_s7 + NO*default/kic_re1_s1);
    vmaf_re1 = 1 mole_per_second; vmar_re1 = 1 mole_per_second; kmc_re1_s6 = 1 substance; kmc_re1_s1 = 1 substance; kic_re1_s1 = 1 substance; kic_re1_s7 = 1 substance; kic_re1_s2 = 1 substance; kic_re1_s6 = 1 substance;
  re5: Stat_1 => NOS; (vmaf_re5/kmc_re5_s5*Stat_1*default - vmar_re5/kmc_re5_s2*NOS*default)/(1 + Stat_1*default/kmc_re5_s5 + NOS*default/kmc_re5_s2);
    vmaf_re5 = 1 mole_per_second; kmc_re5_s5 = 1 substance; vmar_re5 = 1 mole_per_second; kmc_re5_s2 = 1 substance;
  re6: TNF => NOS; (vmaf_re6/kmc_re6_s10*TNF*default - vmar_re6/kmc_re6_s2*NOS*default)/(1 + TNF*default/kmc_re6_s10 + NOS*default/kmc_re6_s2);
    vmaf_re6 = 1 mole_per_second; kmc_re6_s10 = 1 substance; vmar_re6 = 1 mole_per_second; kmc_re6_s2 = 1 substance;
  re7: IFN => NOS; (vmaf_re7/kmc_re7_s9*IFN*default - vmar_re7/kmc_re7_s2*NOS*default)/(1 + IFN*default/kmc_re7_s9 + NOS*default/kmc_re7_s2);
    vmaf_re7 = 1 mole_per_second; kmc_re7_s9 = 1 substance; vmar_re7 = 1 mole_per_second; kmc_re7_s2 = 1 substance;
  re8: IL_1 => NOS; (vmaf_re8/kmc_re8_s11*IL_1*default - vmar_re8/kmc_re8_s2*NOS*default)/(1 + IL_1*default/kmc_re8_s11 + NOS*default/kmc_re8_s2);
    vmaf_re8 = 1 mole_per_second; kmc_re8_s11 = 1 substance; vmar_re8 = 1 mole_per_second; kmc_re8_s2 = 1 substance;
  re9: IL_10 => NOS; (vmaf_re9/kmc_re9_s12*IL_10*default - vmar_re9/kmc_re9_s2*NOS*default)/(1 + IL_10*default/kmc_re9_s12 + NOS*default/kmc_re9_s2);
    vmaf_re9 = 1 mole_per_second; kmc_re9_s12 = 1 substance; vmar_re9 = 1 mole_per_second; kmc_re9_s2 = 1 substance;
  re10: IL_12 => NOS; (vmaf_re10/kmc_re10_s13*IL_12*default - vmar_re10/kmc_re10_s2*NOS*default)/(1 + IL_12*default/kmc_re10_s13 + NOS*default/kmc_re10_s2);
    vmaf_re10 = 1 mole_per_second; kmc_re10_s13 = 1 substance; vmar_re10 = 1 mole_per_second; kmc_re10_s2 = 1 substance;
  re11: MIF => NOS; (vmaf_re11/kmc_re11_s14*MIF*default - vmar_re11/kmc_re11_s2*NOS*default)/(1 + MIF*default/kmc_re11_s14 + NOS*default/kmc_re11_s2);
    vmaf_re11 = 1 mole_per_second; kmc_re11_s14 = 1 substance; vmar_re11 = 1 mole_per_second; kmc_re11_s2 = 1 substance;
  re12: NFKB => NOS; (vmaf_re12/kmc_re12_s8*NFKB*default - vmar_re12/kmc_re12_s2*NOS*default)/(1 + NFKB*default/kmc_re12_s8 + NOS*default/kmc_re12_s2);
    vmaf_re12 = 1 mole_per_second; kmc_re12_s8 = 1 substance; vmar_re12 = 1 mole_per_second; kmc_re12_s2 = 1 substance;
  re13: PKR => IRF_1; (vmaf_re13/kmc_re13_s16*PKR*default - vmar_re13/kmc_re13_s15*IRF_1*default)/(1 + PKR*default/kmc_re13_s16 + IRF_1*default/kmc_re13_s15);
    vmaf_re13 = 1 mole_per_second; kmc_re13_s16 = 1 substance; vmar_re13 = 1 mole_per_second; kmc_re13_s15 = 1 substance;
  re14: PKR => NFKB; (vmaf_re14/kmc_re14_s16*PKR*default - vmar_re14/kmc_re14_s8*NFKB*default)/(1 + PKR*default/kmc_re14_s16 + NFKB*default/kmc_re14_s8);
    vmaf_re14 = 1 mole_per_second; kmc_re14_s16 = 1 substance; vmar_re14 = 1 mole_per_second; kmc_re14_s8 = 1 substance;
  re15: NO => NO2; (vmaf_re15/kmc_re15_s1*NO*default - vmar_re15/kmc_re15_s17*NO2*default)/(1 + NO*default/kmc_re15_s1 + NO2*default/kmc_re15_s17);
    vmaf_re15 = 1 mole_per_second; kmc_re15_s1 = 1 substance; vmar_re15 = 1 mole_per_second; kmc_re15_s17 = 1 substance;
  re16: Dendritic_cells => IL_2; (vmaf_re16/kmc_re16_s20*Dendritic_cells*default - vmar_re16/kmc_re16_s21*IL_2*default)/(1 + NO*default/kic_1_re16_s1 + (Dendritic_cells*default/kmc_re16_s20 + IL_2*default/kmc_re16_s21)*(1 + NO*default/kic_2_re16_s1));  // modifiers: NO
    vmaf_re16 = 1 mole_per_second; kmc_re16_s20 = 1 substance; vmar_re16 = 1 mole_per_second; kmc_re16_s21 = 1 substance; kic_1_re16_s1 = 1 substance; kic_2_re16_s1 = 1 substance;
  re17: Macrophages => IL_2; (vmaf_re17/kmc_re17_s19*Macrophages*default - vmar_re17/kmc_re17_s21*IL_2*default)/(1 + NO*default/kic_1_re17_s1 + (Macrophages*default/kmc_re17_s19 + IL_2*default/kmc_re17_s21)*(1 + NO*default/kic_2_re17_s1));  // modifiers: NO
    vmaf_re17 = 1 mole_per_second; kmc_re17_s19 = 1 substance; vmar_re17 = 1 mole_per_second; kmc_re17_s21 = 1 substance; kic_1_re17_s1 = 1 substance; kic_2_re17_s1 = 1 substance;
  re18: NO => Bcl_2; (vmaf_re18/kmc_re18_s1*NO*default - vmar_re18/kmc_re18_s25*Bcl_2*default)/(1 + NO*default/kmc_re18_s1 + Bcl_2*default/kmc_re18_s25);
    vmaf_re18 = 1 mole_per_second; kmc_re18_s1 = 1 substance; vmar_re18 = 1 mole_per_second; kmc_re18_s25 = 1 substance;
  re19: T_cell => Apoptosis; (vmaf_re19/kmc_re19_s62*T_cell*default - vmar_re19/kmc_re19_s61*Apoptosis*default)/(1 + T_cell*default/kmc_re19_s62 + Apoptosis*default/kmc_re19_s61);
    vmaf_re19 = 1 mole_per_second; kmc_re19_s62 = 1 substance; vmar_re19 = 1 mole_per_second; kmc_re19_s61 = 1 substance;
  re20: T_Cell => T_cell_accumulation; (vmaf_re20/kmc_re20_s29*T_Cell*default - vmar_re20/kmc_re20_s30*T_cell_accumulation*default)/(1 + T_Cell*default/kmc_re20_s29 + T_cell_accumulation*default/kmc_re20_s30);
    vmaf_re20 = 1 mole_per_second; kmc_re20_s29 = 1 substance; vmar_re20 = 1 mole_per_second; kmc_re20_s30 = 1 substance;
  re22: P_selectin => T_Cell; (vmaf_re22/kmc_re22_s32*P_selectin*default - vmar_re22/kmc_re22_s29*T_Cell*default)/(1 + NO*default/kic_1_re22_s1 + (P_selectin*default/kmc_re22_s32 + T_Cell*default/kmc_re22_s29)*(1 + NO*default/kic_2_re22_s1));  // modifiers: NO
    vmaf_re22 = 1 mole_per_second; kmc_re22_s32 = 1 substance; vmar_re22 = 1 mole_per_second; kmc_re22_s29 = 1 substance; kic_1_re22_s1 = 1 substance; kic_2_re22_s1 = 1 substance;
  re23: Lymphocytes => Lymphocyte_proliferation; (vmaf_re23/kmc_re23_s34*Lymphocytes*default - vmar_re23/kmc_re23_s35*Lymphocyte_proliferation*default)/(1 + NO*default/kic_1_re23_s1 + (Lymphocytes*default/kmc_re23_s34 + Lymphocyte_proliferation*default/kmc_re23_s35)*(1 + NO*default/kic_2_re23_s1));  // modifiers: NO
    vmaf_re23 = 1 mole_per_second; kmc_re23_s34 = 1 substance; vmar_re23 = 1 mole_per_second; kmc_re23_s35 = 1 substance; kic_1_re23_s1 = 1 substance; kic_2_re23_s1 = 1 substance;
  re24: Macrophages => IL_12; (vmaf_re24/kmc_re24_s19*Macrophages*default - vmar_re24/kmc_re24_s13*IL_12*default)/(1 + NO*default/kic_1_re24_s1 + (Macrophages*default/kmc_re24_s19 + IL_12*default/kmc_re24_s13)*(1 + NO*default/kic_2_re24_s1));  // modifiers: NO
    vmaf_re24 = 1 mole_per_second; kmc_re24_s19 = 1 substance; vmar_re24 = 1 mole_per_second; kmc_re24_s13 = 1 substance; kic_1_re24_s1 = 1 substance; kic_2_re24_s1 = 1 substance;
  re25: IL_12 => T_Cell; (vmaf_re25/kmc_re25_s13*IL_12*default - vmar_re25/kmc_re25_s29*T_Cell*default)/(1 + IL_12*default/kmc_re25_s13 + T_Cell*default/kmc_re25_s29);
    vmaf_re25 = 1 mole_per_second; kmc_re25_s13 = 1 substance; vmar_re25 = 1 mole_per_second; kmc_re25_s29 = 1 substance;
  re26: Macrophages => TNF; (vmaf_re26/kmc_re26_s19*Macrophages*default - vmar_re26/kmc_re26_s10*TNF*default)/(1 + Macrophages*default/kmc_re26_s19 + TNF*default/kmc_re26_s10);  // modifiers: NO
    vmaf_re26 = 1 mole_per_second; kmc_re26_s19 = 1 substance; vmar_re26 = 1 mole_per_second; kmc_re26_s10 = 1 substance;
  re27: IkB => NFKB; (vmaf_re27/kmc_re27_s36*IkB*default - vmar_re27/kmc_re27_s8*NFKB*default)/(1 + IkB*default/kmc_re27_s36 + NFKB*default/kmc_re27_s8);
    vmaf_re27 = 1 mole_per_second; kmc_re27_s36 = 1 substance; vmar_re27 = 1 mole_per_second; kmc_re27_s8 = 1 substance;
  re28: NO => IkB; (vmaf_re28/kmc_re28_s1*NO*default - vmar_re28/kmc_re28_s36*IkB*default)/(1 + NO*default/kmc_re28_s1 + IkB*default/kmc_re28_s36);
    vmaf_re28 = 1 mole_per_second; kmc_re28_s1 = 1 substance; vmar_re28 = 1 mole_per_second; kmc_re28_s36 = 1 substance;
  re29: NFKB => TNF; (vmaf_re29/kmc_re29_s8*NFKB*default - vmar_re29/kmc_re29_s10*TNF*default)/(1 + NFKB*default/kmc_re29_s8 + TNF*default/kmc_re29_s10);
    vmaf_re29 = 1 mole_per_second; kmc_re29_s8 = 1 substance; vmar_re29 = 1 mole_per_second; kmc_re29_s10 = 1 substance;
  re30: T_Cell => IL_2; (vmaf_re30/kmc_re30_s29*T_Cell*default - vmar_re30/kmc_re30_s21*IL_2*default)/(1 + T_Cell*default/kmc_re30_s29 + IL_2*default/kmc_re30_s21);
    vmaf_re30 = 1 mole_per_second; kmc_re30_s29 = 1 substance; vmar_re30 = 1 mole_per_second; kmc_re30_s21 = 1 substance;
  re31: T_Cell => IFN; (vmaf_re31/kmc_re31_s29*T_Cell*default - vmar_re31/kmc_re31_s9*IFN*default)/(1 + NO*default/kic_1_re31_s1 + (T_Cell*default/kmc_re31_s29 + IFN*default/kmc_re31_s9)*(1 + NO*default/kic_2_re31_s1));  // modifiers: NO
    vmaf_re31 = 1 mole_per_second; kmc_re31_s29 = 1 substance; vmar_re31 = 1 mole_per_second; kmc_re31_s9 = 1 substance; kic_1_re31_s1 = 1 substance; kic_2_re31_s1 = 1 substance;
  re32: NO => IL_4; (vmaf_re32/kmc_re32_s1*NO*default - vmar_re32/kmc_re32_s37*IL_4*default)/(1 + NO*default/kmc_re32_s1 + IL_4*default/kmc_re32_s37);
    vmaf_re32 = 1 mole_per_second; kmc_re32_s1 = 1 substance; vmar_re32 = 1 mole_per_second; kmc_re32_s37 = 1 substance;
  re33: IL_4 => T_Cell; (vmaf_re33/kmc_re33_s37*IL_4*default - vmar_re33/kmc_re33_s29*T_Cell*default)/(1 + IL_4*default/kmc_re33_s37 + T_Cell*default/kmc_re33_s29);
    vmaf_re33 = 1 mole_per_second; kmc_re33_s37 = 1 substance; vmar_re33 = 1 mole_per_second; kmc_re33_s29 = 1 substance;
  re34: T_Cell => IL_4; (vmaf_re34/kmc_re34_s29*T_Cell*default - vmar_re34/kmc_re34_s37*IL_4*default)/(1 + T_Cell*default/kmc_re34_s29 + IL_4*default/kmc_re34_s37);
    vmaf_re34 = 1 mole_per_second; kmc_re34_s29 = 1 substance; vmar_re34 = 1 mole_per_second; kmc_re34_s37 = 1 substance;
  re35: IFN => Macrophages; (vmaf_re35/kmc_re35_s9*IFN*default - vmar_re35/kmc_re35_s19*Macrophages*default)/(1 + IFN*default/kmc_re35_s9 + Macrophages*default/kmc_re35_s19);
    vmaf_re35 = 1 mole_per_second; kmc_re35_s9 = 1 substance; vmar_re35 = 1 mole_per_second; kmc_re35_s19 = 1 substance;
  re36: IL_4 => VCAM_1; (vmaf_re36/kmc_re36_s37*IL_4*default - vmar_re36/kmc_re36_s38*VCAM_1*default)/(1 + IL_4*default/kmc_re36_s37 + VCAM_1*default/kmc_re36_s38);
    vmaf_re36 = 1 mole_per_second; kmc_re36_s37 = 1 substance; vmar_re36 = 1 mole_per_second; kmc_re36_s38 = 1 substance;
  re37: Macrophages => NO; (vmaf_re37/kmc_re37_s19*Macrophages*default - vmar_re37/kmc_re37_s1*NO*default)/(1 + Macrophages*default/kmc_re37_s19 + NO*default/kmc_re37_s1);
    vmaf_re37 = 1 mole_per_second; kmc_re37_s19 = 1 substance; vmar_re37 = 1 mole_per_second; kmc_re37_s1 = 1 substance;
  re38: Macrophages => IL_1; (vmaf_re38/kmc_re38_s19*Macrophages*default - vmar_re38/kmc_re38_s11*IL_1*default)/(1 + Macrophages*default/kmc_re38_s19 + IL_1*default/kmc_re38_s11);
    vmaf_re38 = 1 mole_per_second; kmc_re38_s19 = 1 substance; vmar_re38 = 1 mole_per_second; kmc_re38_s11 = 1 substance;
  re39: Viral_infection => NOS; (vmaf_re39/kmc_re39_s39*Viral_infection*default - vmar_re39/kmc_re39_s2*NOS*default)/(1 + Viral_infection*default/kmc_re39_s39 + NOS*default/kmc_re39_s2);
    vmaf_re39 = 1 mole_per_second; kmc_re39_s39 = 1 substance; vmar_re39 = 1 mole_per_second; kmc_re39_s2 = 1 substance;
  re40: T_Cell => IL_5; (vmaf_re40/kmc_re40_s29*T_Cell*default - vmar_re40/kmc_re40_s40*IL_5*default)/(1 + T_Cell*default/kmc_re40_s29 + IL_5*default/kmc_re40_s40);
    vmaf_re40 = 1 mole_per_second; kmc_re40_s29 = 1 substance; vmar_re40 = 1 mole_per_second; kmc_re40_s40 = 1 substance;
  re41: T_Cell => IL_6; (vmaf_re41/kmc_re41_s29*T_Cell*default - vmar_re41/kmc_re41_s41*IL_6*default)/(1 + T_Cell*default/kmc_re41_s29 + IL_6*default/kmc_re41_s41);
    vmaf_re41 = 1 mole_per_second; kmc_re41_s29 = 1 substance; vmar_re41 = 1 mole_per_second; kmc_re41_s41 = 1 substance;
  re42: T_Cell => IL_13; (vmaf_re42/kmc_re42_s29*T_Cell*default - vmar_re42/kmc_re42_s42*IL_13*default)/(1 + T_Cell*default/kmc_re42_s29 + IL_13*default/kmc_re42_s42);
    vmaf_re42 = 1 mole_per_second; kmc_re42_s29 = 1 substance; vmar_re42 = 1 mole_per_second; kmc_re42_s42 = 1 substance;
  re45: IL_4 => Mast_cells; (vmaf_re45/kmc_re45_s37*IL_4*default - vmar_re45/kmc_re45_s23*Mast_cells*default)/(1 + IL_4*default/kmc_re45_s37 + Mast_cells*default/kmc_re45_s23);
    vmaf_re45 = 1 mole_per_second; kmc_re45_s37 = 1 substance; vmar_re45 = 1 mole_per_second; kmc_re45_s23 = 1 substance;
  re46: IL_4 => Eosinophils; (vmaf_re46/kmc_re46_s37*IL_4*default - vmar_re46/kmc_re46_s43*Eosinophils*default)/(1 + IL_4*default/kmc_re46_s37 + Eosinophils*default/kmc_re46_s43);
    vmaf_re46 = 1 mole_per_second; kmc_re46_s37 = 1 substance; vmar_re46 = 1 mole_per_second; kmc_re46_s43 = 1 substance;
  re47: IL_5 => Mast_cells; (vmaf_re47/kmc_re47_s40*IL_5*default - vmar_re47/kmc_re47_s23*Mast_cells*default)/(1 + IL_5*default/kmc_re47_s40 + Mast_cells*default/kmc_re47_s23);
    vmaf_re47 = 1 mole_per_second; kmc_re47_s40 = 1 substance; vmar_re47 = 1 mole_per_second; kmc_re47_s23 = 1 substance;
  re48: IL_5 => Eosinophils; (vmaf_re48/kmc_re48_s40*IL_5*default - vmar_re48/kmc_re48_s43*Eosinophils*default)/(1 + IL_5*default/kmc_re48_s40 + Eosinophils*default/kmc_re48_s43);
    vmaf_re48 = 1 mole_per_second; kmc_re48_s40 = 1 substance; vmar_re48 = 1 mole_per_second; kmc_re48_s43 = 1 substance;
  re49: IL_6 => Mast_cells; (vmaf_re49/kmc_re49_s41*IL_6*default - vmar_re49/kmc_re49_s23*Mast_cells*default)/(1 + IL_6*default/kmc_re49_s41 + Mast_cells*default/kmc_re49_s23);
    vmaf_re49 = 1 mole_per_second; kmc_re49_s41 = 1 substance; vmar_re49 = 1 mole_per_second; kmc_re49_s23 = 1 substance;
  re50: IL_6 => Eosinophils; (vmaf_re50/kmc_re50_s41*IL_6*default - vmar_re50/kmc_re50_s43*Eosinophils*default)/(1 + IL_6*default/kmc_re50_s41 + Eosinophils*default/kmc_re50_s43);
    vmaf_re50 = 1 mole_per_second; kmc_re50_s41 = 1 substance; vmar_re50 = 1 mole_per_second; kmc_re50_s43 = 1 substance;
  re51: IL_13 => Mast_cells; (vmaf_re51/kmc_re51_s42*IL_13*default - vmar_re51/kmc_re51_s23*Mast_cells*default)/(1 + IL_13*default/kmc_re51_s42 + Mast_cells*default/kmc_re51_s23);
    vmaf_re51 = 1 mole_per_second; kmc_re51_s42 = 1 substance; vmar_re51 = 1 mole_per_second; kmc_re51_s23 = 1 substance;
  re52: IL_13 => Eosinophils; (vmaf_re52/kmc_re52_s42*IL_13*default - vmar_re52/kmc_re52_s43*Eosinophils*default)/(1 + IL_13*default/kmc_re52_s42 + Eosinophils*default/kmc_re52_s43);
    vmaf_re52 = 1 mole_per_second; kmc_re52_s42 = 1 substance; vmar_re52 = 1 mole_per_second; kmc_re52_s43 = 1 substance;
  re53: Dendritic_cells => IL_12; (vmaf_re53/kmc_re53_s20*Dendritic_cells*default - vmar_re53/kmc_re53_s13*IL_12*default)/(1 + Dendritic_cells*default/kmc_re53_s20 + IL_12*default/kmc_re53_s13);
    vmaf_re53 = 1 mole_per_second; kmc_re53_s20 = 1 substance; vmar_re53 = 1 mole_per_second; kmc_re53_s13 = 1 substance;
  re54: Dendritic_cells => TNF; (vmaf_re54/kmc_re54_s20*Dendritic_cells*default - vmar_re54/kmc_re54_s10*TNF*default)/(1 + Dendritic_cells*default/kmc_re54_s20 + TNF*default/kmc_re54_s10);
    vmaf_re54 = 1 mole_per_second; kmc_re54_s20 = 1 substance; vmar_re54 = 1 mole_per_second; kmc_re54_s10 = 1 substance;
  re55: Dendritic_cells => IL_6; (vmaf_re55/kmc_re55_s20*Dendritic_cells*default - vmar_re55/kmc_re55_s41*IL_6*default)/(1 + Dendritic_cells*default/kmc_re55_s20 + IL_6*default/kmc_re55_s41);
    vmaf_re55 = 1 mole_per_second; kmc_re55_s20 = 1 substance; vmar_re55 = 1 mole_per_second; kmc_re55_s41 = 1 substance;
  re56: Dendritic_cells => IFN; (vmaf_re56/kmc_re56_s20*Dendritic_cells*default - vmar_re56/kmc_re56_s9*IFN*default)/(1 + Dendritic_cells*default/kmc_re56_s20 + IFN*default/kmc_re56_s9);
    vmaf_re56 = 1 mole_per_second; kmc_re56_s20 = 1 substance; vmar_re56 = 1 mole_per_second; kmc_re56_s9 = 1 substance;
  re57: Lymphocytes => IFN; (vmaf_re57/kmc_re57_s34*Lymphocytes*default - vmar_re57/kmc_re57_s9*IFN*default)/(1 + Lymphocytes*default/kmc_re57_s34 + IFN*default/kmc_re57_s9);
    vmaf_re57 = 1 mole_per_second; kmc_re57_s34 = 1 substance; vmar_re57 = 1 mole_per_second; kmc_re57_s9 = 1 substance;
  re58: IFN => Stat_1; (vmaf_re58/kmc_re58_s9*IFN*default - vmar_re58/kmc_re58_s5*Stat_1*default)/(1 + IFN*default/kmc_re58_s9 + Stat_1*default/kmc_re58_s5);
    vmaf_re58 = 1 mole_per_second; kmc_re58_s9 = 1 substance; vmar_re58 = 1 mole_per_second; kmc_re58_s5 = 1 substance;
  re60: procaspase_8 => Caspase_8; (vmaf_re60/kmc_re60_s44*procaspase_8*default - vmar_re60/kmc_re60_s45*Caspase_8*default)/(1 + procaspase_8*default/kmc_re60_s44 + Caspase_8*default/kmc_re60_s45);
    vmaf_re60 = 1 mole_per_second; kmc_re60_s44 = 1 substance; vmar_re60 = 1 mole_per_second; kmc_re60_s45 = 1 substance;
  re61: Caspase_8 => Bcl_2; (vmaf_re61/kmc_re61_s45*Caspase_8*default - vmar_re61/kmc_re61_s25*Bcl_2*default)/(1 + Caspase_8*default/kmc_re61_s45 + Bcl_2*default/kmc_re61_s25);
    vmaf_re61 = 1 mole_per_second; kmc_re61_s45 = 1 substance; vmar_re61 = 1 mole_per_second; kmc_re61_s25 = 1 substance;
  re62: Caspase_8 => Cytochrome_c; (vmaf_re62/kmc_re62_s45*Caspase_8*default - vmar_re62/kmc_re62_s46*Cytochrome_c*default)/(1 + Caspase_8*default/kmc_re62_s45 + Cytochrome_c*default/kmc_re62_s46);
    vmaf_re62 = 1 mole_per_second; kmc_re62_s45 = 1 substance; vmar_re62 = 1 mole_per_second; kmc_re62_s46 = 1 substance;
  re63: Caspase_8 => Bid; (vmaf_re63/kmc_re63_s45*Caspase_8*default - vmar_re63/kmc_re63_s47*Bid*default)/(1 + Caspase_8*default/kmc_re63_s45 + Bid*default/kmc_re63_s47);
    vmaf_re63 = 1 mole_per_second; kmc_re63_s45 = 1 substance; vmar_re63 = 1 mole_per_second; kmc_re63_s47 = 1 substance;
  re64: Caspase_8 => S_nitrosylated_Caspase; (vmaf_re64/kmc_re64_s45*Caspase_8*default - vmar_re64/kmc_re64_s48*S_nitrosylated_Caspase*default)/(1 + Caspase_8*default/kmc_re64_s45 + S_nitrosylated_Caspase*default/kmc_re64_s48);
    vmaf_re64 = 1 mole_per_second; kmc_re64_s45 = 1 substance; vmar_re64 = 1 mole_per_second; kmc_re64_s48 = 1 substance;
  re65: Bid => Cytochrome_c; (vmaf_re65/kmc_re65_s47*Bid*default - vmar_re65/kmc_re65_s46*Cytochrome_c*default)/(1 + S_nitrosylated_Caspase*default/kic_1_re65_s48 + (Bid*default/kmc_re65_s47 + Cytochrome_c*default/kmc_re65_s46)*(1 + S_nitrosylated_Caspase*default/kic_2_re65_s48));  // modifiers: S_nitrosylated_Caspase
    vmaf_re65 = 1 mole_per_second; kmc_re65_s47 = 1 substance; vmar_re65 = 1 mole_per_second; kmc_re65_s46 = 1 substance; kic_1_re65_s48 = 1 substance; kic_2_re65_s48 = 1 substance;
  re66: Bcl_2 => Cytochrome_c; (vmaf_re66/kmc_re66_s25*Bcl_2*default - vmar_re66/kmc_re66_s46*Cytochrome_c*default)/(1 + S_nitrosylated_Caspase*default/kic_1_re66_s48 + (Bcl_2*default/kmc_re66_s25 + Cytochrome_c*default/kmc_re66_s46)*(1 + S_nitrosylated_Caspase*default/kic_2_re66_s48));  // modifiers: S_nitrosylated_Caspase
    vmaf_re66 = 1 mole_per_second; kmc_re66_s25 = 1 substance; vmar_re66 = 1 mole_per_second; kmc_re66_s46 = 1 substance; kic_1_re66_s48 = 1 substance; kic_2_re66_s48 = 1 substance;
  re67: pro_IL_1 + ICE => Mature_IL_1; (vmaf_re67/(kic_re67_s49*kmc_re67_s51)*pro_IL_1*default*ICE*default - vmar_re67/kmc_re67_s50*Mature_IL_1*default)/(1 + Mature_IL_1*default/kmc_re67_s50 + pro_IL_1*default/kic_re67_s49 + pro_IL_1*default*ICE*default/(kic_re67_s49*kmc_re67_s51) + ICE*default/kic_re67_s51);
    vmaf_re67 = 1 mole_per_second; vmar_re67 = 1 mole_per_second; kmc_re67_s51 = 1 substance; kmc_re67_s50 = 1 substance; kic_re67_s49 = 1 substance; kic_re67_s51 = 1 substance;
  re68: Mature_IL_1 => IL_1; (vmaf_re68/kmc_re68_s50*Mature_IL_1*default - vmar_re68/kmc_re68_s11*IL_1*default)/(1 + Mature_IL_1*default/kmc_re68_s50 + IL_1*default/kmc_re68_s11);
    vmaf_re68 = 1 mole_per_second; kmc_re68_s50 = 1 substance; vmar_re68 = 1 mole_per_second; kmc_re68_s11 = 1 substance;
  re69: Caspase_1 => ICE; (vmaf_re69/kmc_re69_s52*Caspase_1*default - vmar_re69/kmc_re69_s51*ICE*default)/(1 + Caspase_1*default/kmc_re69_s52 + ICE*default/kmc_re69_s51);
    vmaf_re69 = 1 mole_per_second; kmc_re69_s52 = 1 substance; vmar_re69 = 1 mole_per_second; kmc_re69_s51 = 1 substance;
  re70: IL_18 + ICE => IFN; (vmaf_re70/(kic_re70_s53*kmc_re70_s51)*IL_18*default*ICE*default - vmar_re70/kmc_re70_s9*IFN*default)/(1 + IFN*default/kmc_re70_s9 + IL_18*default/kic_re70_s53 + IL_18*default*ICE*default/(kic_re70_s53*kmc_re70_s51) + ICE*default/kic_re70_s51);
    vmaf_re70 = 1 mole_per_second; vmar_re70 = 1 mole_per_second; kmc_re70_s51 = 1 substance; kmc_re70_s9 = 1 substance; kic_re70_s53 = 1 substance; kic_re70_s51 = 1 substance;
  re72: IFN => IFN; (vmaf_re72/kmc_re72_s9*IFN*default - vmar_re72/kmc_re72_s9*IFN*default)/(1 + IFN*default/kmc_re72_s9 + IFN*default/kmc_re72_s9);
    vmaf_re72 = 1 mole_per_second; kmc_re72_s9 = 1 substance; vmar_re72 = 1 mole_per_second;
  re73: Caspase_1 => S_nitrosylated_Caspase; (vmaf_re73/kmc_re73_s52*Caspase_1*default - vmar_re73/kmc_re73_s48*S_nitrosylated_Caspase*default)/(1 + Caspase_1*default/kmc_re73_s52 + S_nitrosylated_Caspase*default/kmc_re73_s48);
    vmaf_re73 = 1 mole_per_second; kmc_re73_s52 = 1 substance; vmar_re73 = 1 mole_per_second; kmc_re73_s48 = 1 substance;
  re74: NO => P53; (vmaf_re74/kmc_re74_s1*NO*default - vmar_re74/kmc_re74_s54*P53*default)/(1 + NO*default/kmc_re74_s1 + P53*default/kmc_re74_s54);
    vmaf_re74 = 1 mole_per_second; kmc_re74_s1 = 1 substance; vmar_re74 = 1 mole_per_second; kmc_re74_s54 = 1 substance;
  re75: P53 => Bax; (vmaf_re75/kmc_re75_s54*P53*default - vmar_re75/kmc_re75_s55*Bax*default)/(1 + P53*default/kmc_re75_s54 + Bax*default/kmc_re75_s55);
    vmaf_re75 = 1 mole_per_second; kmc_re75_s54 = 1 substance; vmar_re75 = 1 mole_per_second; kmc_re75_s55 = 1 substance;
  re76: Bax => Cytochrome_c; (vmaf_re76/kmc_re76_s55*Bax*default - vmar_re76/kmc_re76_s46*Cytochrome_c*default)/(1 + Bcl_2*default/kic_1_re76_s25 + (Bax*default/kmc_re76_s55 + Cytochrome_c*default/kmc_re76_s46)*(1 + Bcl_2*default/kic_2_re76_s25));  // modifiers: Bcl_2
    vmaf_re76 = 1 mole_per_second; kmc_re76_s55 = 1 substance; vmar_re76 = 1 mole_per_second; kmc_re76_s46 = 1 substance; kic_1_re76_s25 = 1 substance; kic_2_re76_s25 = 1 substance;
  re77: Cytochrome_c => Caspase_3; (vmaf_re77/kmc_re77_s46*Cytochrome_c*default - vmar_re77/kmc_re77_s56*Caspase_3*default)/(1 + Cytochrome_c*default/kmc_re77_s46 + Caspase_3*default/kmc_re77_s56);
    vmaf_re77 = 1 mole_per_second; kmc_re77_s46 = 1 substance; vmar_re77 = 1 mole_per_second; kmc_re77_s56 = 1 substance;
  re78: procaspase_9 + Apaf1 => Caspase_9; (vmaf_re78/(kic_re78_s57*kmc_re78_s59)*procaspase_9*default*Apaf1*default - vmar_re78/kmc_re78_s58*Caspase_9*default)/(1 + Caspase_9*default/kmc_re78_s58 + procaspase_9*default/kic_re78_s57 + procaspase_9*default*Apaf1*default/(kic_re78_s57*kmc_re78_s59) + Apaf1*default/kic_re78_s59);
    vmaf_re78 = 1 mole_per_second; vmar_re78 = 1 mole_per_second; kmc_re78_s59 = 1 substance; kmc_re78_s58 = 1 substance; kic_re78_s57 = 1 substance; kic_re78_s59 = 1 substance;
  re79: Caspase_9 => Caspase_3; (vmaf_re79/kmc_re79_s58*Caspase_9*default - vmar_re79/kmc_re79_s56*Caspase_3*default)/(1 + Caspase_9*default/kmc_re79_s58 + Caspase_3*default/kmc_re79_s56);
    vmaf_re79 = 1 mole_per_second; kmc_re79_s58 = 1 substance; vmar_re79 = 1 mole_per_second; kmc_re79_s56 = 1 substance;
  re80: Caspase_9 => Caspase_7; (vmaf_re80/kmc_re80_s58*Caspase_9*default - vmar_re80/kmc_re80_s60*Caspase_7*default)/(1 + Caspase_9*default/kmc_re80_s58 + Caspase_7*default/kmc_re80_s60);
    vmaf_re80 = 1 mole_per_second; kmc_re80_s58 = 1 substance; vmar_re80 = 1 mole_per_second; kmc_re80_s60 = 1 substance;
  re81: Caspase_8 => Caspase_3; (vmaf_re81/kmc_re81_s45*Caspase_8*default - vmar_re81/kmc_re81_s56*Caspase_3*default)/(1 + Caspase_8*default/kmc_re81_s45 + Caspase_3*default/kmc_re81_s56);
    vmaf_re81 = 1 mole_per_second; kmc_re81_s45 = 1 substance; vmar_re81 = 1 mole_per_second; kmc_re81_s56 = 1 substance;
  re82: Caspase_3 => Apoptosis; (vmaf_re82/kmc_re82_s56*Caspase_3*default - vmar_re82/kmc_re82_s61*Apoptosis*default)/(1 + Caspase_3*default/kmc_re82_s56 + Apoptosis*default/kmc_re82_s61);
    vmaf_re82 = 1 mole_per_second; kmc_re82_s56 = 1 substance; vmar_re82 = 1 mole_per_second; kmc_re82_s61 = 1 substance;
  re83: NO => T_cell; (vmaf_re83/kmc_re83_s1*NO*default - vmar_re83/kmc_re83_s62*T_cell*default)/(1 + NO*default/kmc_re83_s1 + T_cell*default/kmc_re83_s62);
    vmaf_re83 = 1 mole_per_second; kmc_re83_s1 = 1 substance; vmar_re83 = 1 mole_per_second; kmc_re83_s62 = 1 substance;
  re84: Cytochrome_c => Caspase_9; (vmaf_re84/kmc_re84_s46*Cytochrome_c*default - vmar_re84/kmc_re84_s58*Caspase_9*default)/(1 + Cytochrome_c*default/kmc_re84_s46 + Caspase_9*default/kmc_re84_s58);
    vmaf_re84 = 1 mole_per_second; kmc_re84_s46 = 1 substance; vmar_re84 = 1 mole_per_second; kmc_re84_s58 = 1 substance;
  re85: Viral_infection => PRRs; (vmaf_re85/kmc_re85_s39*Viral_infection*default - vmar_re85/kmc_re85_s63*PRRs*default)/(1 + Viral_infection*default/kmc_re85_s39 + PRRs*default/kmc_re85_s63);
    vmaf_re85 = 1 mole_per_second; kmc_re85_s39 = 1 substance; vmar_re85 = 1 mole_per_second; kmc_re85_s63 = 1 substance;
  re86: PRRs => IRF_3; (vmaf_re86/kmc_re86_s63*PRRs*default - vmar_re86/kmc_re86_s64*IRF_3*default)/(1 + PRRs*default/kmc_re86_s63 + IRF_3*default/kmc_re86_s64);
    vmaf_re86 = 1 mole_per_second; kmc_re86_s63 = 1 substance; vmar_re86 = 1 mole_per_second; kmc_re86_s64 = 1 substance;
  re87: PRRs => IRF_7; (vmaf_re87/kmc_re87_s63*PRRs*default - vmar_re87/kmc_re87_s65*IRF_7*default)/(1 + PRRs*default/kmc_re87_s63 + IRF_7*default/kmc_re87_s65);
    vmaf_re87 = 1 mole_per_second; kmc_re87_s63 = 1 substance; vmar_re87 = 1 mole_per_second; kmc_re87_s65 = 1 substance;
  re88: PRRs => IRF_1; (vmaf_re88/kmc_re88_s63*PRRs*default - vmar_re88/kmc_re88_s15*IRF_1*default)/(1 + PRRs*default/kmc_re88_s63 + IRF_1*default/kmc_re88_s15);
    vmaf_re88 = 1 mole_per_second; kmc_re88_s63 = 1 substance; vmar_re88 = 1 mole_per_second; kmc_re88_s15 = 1 substance;
  re89: IRF_1 => IL_12; (vmaf_re89/kmc_re89_s15*IRF_1*default - vmar_re89/kmc_re89_s13*IL_12*default)/(1 + IRF_1*default/kmc_re89_s15 + IL_12*default/kmc_re89_s13);
    vmaf_re89 = 1 mole_per_second; kmc_re89_s15 = 1 substance; vmar_re89 = 1 mole_per_second; kmc_re89_s13 = 1 substance;
  re90: IRF_1 => IFN; (vmaf_re90/kmc_re90_s15*IRF_1*default - vmar_re90/kmc_re90_s9*IFN*default)/(1 + IRF_1*default/kmc_re90_s15 + IFN*default/kmc_re90_s9);
    vmaf_re90 = 1 mole_per_second; kmc_re90_s15 = 1 substance; vmar_re90 = 1 mole_per_second; kmc_re90_s9 = 1 substance;
  re91: Caspase_7 => Caspase_3; (vmaf_re91/kmc_re91_s60*Caspase_7*default - vmar_re91/kmc_re91_s56*Caspase_3*default)/(1 + Caspase_7*default/kmc_re91_s60 + Caspase_3*default/kmc_re91_s56);
    vmaf_re91 = 1 mole_per_second; kmc_re91_s60 = 1 substance; vmar_re91 = 1 mole_per_second; kmc_re91_s56 = 1 substance;

  // Unit definitions:
  unit substance = mole;
  unit volume = litre;
  unit area = metre^2;
  unit length = metre;
  unit time = second;
  unit mole_per_second = mole / second;
end
