// SBML level 2 version 4

model CardioVasucular()

  // Compartments:
  compartment default = 1 volume;

  // Species:
  species NETs in default = 0;
  species Cystic_Fibrosis in default = 1/default;
  species Neutrophils in default = 0;
  species Extracellular_histones in default = 0;
  species Sepsis in default = 0;
  species ARDS in default = 0;
  species Impaired_gas_exchange in default = 0;
  species Secondary_Infections in default = 0;
  species Thrombin in default = 0;
  species Platelets in default = 0;
  species Antithrombin_III in default = 0;
  species Inflammatiory_mediators in default = 0;
  species Macrophages in default = 0;
  species PAR_1 in default = 1/default; PAR_1 is "PAR-1";
  species Fibrinogen in default = 1/default;
  species Fibrin in default = 1/default;
  species Clot_stabilization in default = 1/default;
  species Hydroxylation in default = 0;
  species HIF in default = 0;
  species HRE in default = 1/default;
  species PAI_1 in default = 0; PAI_1 is "PAI-1";
  species Aggregation in default = 0;
  species Thrombosis in default = 0;
  species EGR_1 in default = 1/default; EGR_1 is "EGR-1";
  species Hypoxia in default = 0;
  species Leukocyte in default = 0;
  species Tissue_factor in default = 0;
  species von_Willebrand_factor in default = 0;
  species Factor_XIII in default = 0;
  species FV in default = 0.94/default;
  species FVIII in default = 1.04/default;
  species Activated_Protein_C in default = 0;
  species Protein_C in default = 0;
  species EPCR in default = 1.01/default;
  species Thrombomodulin in default = 0.11/default;
  species Infection in default = 1.02/default;
  species PHD_enzymes in default = 0.99/default;

  // Reactions:
  re2: Neutrophils => NETs; (vmaf_re2/kmc_re2_s3*Neutrophils*default - vmar_re2/kmc_re2_s1*NETs*default)/(1 + Neutrophils*default/kmc_re2_s3 + NETs*default/kmc_re2_s1);
    vmaf_re2 = 1 mole_per_second; kmc_re2_s3 = 1 substance; vmar_re2 = 1 mole_per_second; kmc_re2_s1 = 1 substance;
  re3: NETs => Extracellular_histones; (vmaf_re3/kmc_re3_s1*NETs*default - vmar_re3/kmc_re3_s4*Extracellular_histones*default)/(1 + NETs*default/kmc_re3_s1 + Extracellular_histones*default/kmc_re3_s4);
    vmaf_re3 = 1 mole_per_second; kmc_re3_s1 = 1 substance; vmar_re3 = 1 mole_per_second; kmc_re3_s4 = 1 substance;
  re4: Extracellular_histones => Sepsis; (vmaf_re4/kmc_re4_s4*Extracellular_histones*default - vmar_re4/kmc_re4_s5*Sepsis*default)/(1 + Extracellular_histones*default/kmc_re4_s4 + Sepsis*default/kmc_re4_s5);
    vmaf_re4 = 1 mole_per_second; kmc_re4_s4 = 1 substance; vmar_re4 = 1 mole_per_second; kmc_re4_s5 = 1 substance;
  re5: Extracellular_histones => ARDS; (vmaf_re5/kmc_re5_s4*Extracellular_histones*default - vmar_re5/kmc_re5_s6*ARDS*default)/(1 + Extracellular_histones*default/kmc_re5_s4 + ARDS*default/kmc_re5_s6);
    vmaf_re5 = 1 mole_per_second; kmc_re5_s4 = 1 substance; vmar_re5 = 1 mole_per_second; kmc_re5_s6 = 1 substance;
  re6: Cystic_Fibrosis => Impaired_gas_exchange; (vmaf_re6/kmc_re6_s2*Cystic_Fibrosis*default - vmar_re6/kmc_re6_s7*Impaired_gas_exchange*default)/(1 + Cystic_Fibrosis*default/kmc_re6_s2 + Impaired_gas_exchange*default/kmc_re6_s7);
    vmaf_re6 = 1 mole_per_second; kmc_re6_s2 = 1 substance; vmar_re6 = 1 mole_per_second; kmc_re6_s7 = 1 substance;
  re7: Impaired_gas_exchange => Secondary_Infections; (vmaf_re7/kmc_re7_s7*Impaired_gas_exchange*default - vmar_re7/kmc_re7_s8*Secondary_Infections*default)/(1 + Impaired_gas_exchange*default/kmc_re7_s7 + Secondary_Infections*default/kmc_re7_s8);
    vmaf_re7 = 1 mole_per_second; kmc_re7_s7 = 1 substance; vmar_re7 = 1 mole_per_second; kmc_re7_s8 = 1 substance;
  re9: Secondary_Infections => Neutrophils; (vmaf_re9/kmc_re9_s8*Secondary_Infections*default - vmar_re9/kmc_re9_s3*Neutrophils*default)/(1 + Secondary_Infections*default/kmc_re9_s8 + Neutrophils*default/kmc_re9_s3);
    vmaf_re9 = 1 mole_per_second; kmc_re9_s8 = 1 substance; vmar_re9 = 1 mole_per_second; kmc_re9_s3 = 1 substance;
  re10: NETs => Thrombin; (vmaf_re10/kmc_re10_s1*NETs*default - vmar_re10/kmc_re10_s9*Thrombin*default)/(1 + NETs*default/kmc_re10_s1 + Thrombin*default/kmc_re10_s9);
    vmaf_re10 = 1 mole_per_second; kmc_re10_s1 = 1 substance; vmar_re10 = 1 mole_per_second; kmc_re10_s9 = 1 substance;
  re12: Extracellular_histones => Platelets; (vmaf_re12/kmc_re12_s4*Extracellular_histones*default - vmar_re12/kmc_re12_s11*Platelets*default)/(1 + Extracellular_histones*default/kmc_re12_s4 + Platelets*default/kmc_re12_s11);
    vmaf_re12 = 1 mole_per_second; kmc_re12_s4 = 1 substance; vmar_re12 = 1 mole_per_second; kmc_re12_s11 = 1 substance;
  re13: NETs => Antithrombin_III; (vmaf_re13/kmc_re13_s1*NETs*default - vmar_re13/kmc_re13_s12*Antithrombin_III*default)/(1 + NETs*default/kmc_re13_s1 + Antithrombin_III*default/kmc_re13_s12);
    vmaf_re13 = 1 mole_per_second; kmc_re13_s1 = 1 substance; vmar_re13 = 1 mole_per_second; kmc_re13_s12 = 1 substance;
  re14: Thrombin => Platelets; (vmaf_re14/kmc_re14_s9*Thrombin*default - vmar_re14/kmc_re14_s11*Platelets*default)/(1 + Thrombin*default/kmc_re14_s9 + Platelets*default/kmc_re14_s11);
    vmaf_re14 = 1 mole_per_second; kmc_re14_s9 = 1 substance; vmar_re14 = 1 mole_per_second; kmc_re14_s11 = 1 substance;
  re15: Platelets => NETs; (vmaf_re15/kmc_re15_s11*Platelets*default - vmar_re15/kmc_re15_s1*NETs*default)/(1 + Platelets*default/kmc_re15_s11 + NETs*default/kmc_re15_s1);
    vmaf_re15 = 1 mole_per_second; kmc_re15_s11 = 1 substance; vmar_re15 = 1 mole_per_second; kmc_re15_s1 = 1 substance;
  re16: Inflammatiory_mediators => Neutrophils; (vmaf_re16/kmc_re16_s13*Inflammatiory_mediators*default - vmar_re16/kmc_re16_s3*Neutrophils*default)/(1 + Inflammatiory_mediators*default/kmc_re16_s13 + Neutrophils*default/kmc_re16_s3);
    vmaf_re16 = 1 mole_per_second; kmc_re16_s13 = 1 substance; vmar_re16 = 1 mole_per_second; kmc_re16_s3 = 1 substance;
  re18: NETs => Macrophages; (vmaf_re18/kmc_re18_s1*NETs*default - vmar_re18/kmc_re18_s15*Macrophages*default)/(1 + NETs*default/kmc_re18_s1 + Macrophages*default/kmc_re18_s15);
    vmaf_re18 = 1 mole_per_second; kmc_re18_s1 = 1 substance; vmar_re18 = 1 mole_per_second; kmc_re18_s15 = 1 substance;
  re19: Macrophages => Inflammatiory_mediators; (vmaf_re19/kmc_re19_s15*Macrophages*default - vmar_re19/kmc_re19_s13*Inflammatiory_mediators*default)/(1 + Macrophages*default/kmc_re19_s15 + Inflammatiory_mediators*default/kmc_re19_s13);
    vmaf_re19 = 1 mole_per_second; kmc_re19_s15 = 1 substance; vmar_re19 = 1 mole_per_second; kmc_re19_s13 = 1 substance;
  re20: Inflammatiory_mediators => NETs; (vmaf_re20/kmc_re20_s13*Inflammatiory_mediators*default - vmar_re20/kmc_re20_s1*NETs*default)/(1 + Inflammatiory_mediators*default/kmc_re20_s13 + NETs*default/kmc_re20_s1);
    vmaf_re20 = 1 mole_per_second; kmc_re20_s13 = 1 substance; vmar_re20 = 1 mole_per_second; kmc_re20_s1 = 1 substance;
  re21: Platelets => Thrombin; (vmaf_re21/kmc_re21_s11*Platelets*default - vmar_re21/kmc_re21_s9*Thrombin*default)/(1 + Platelets*default/kmc_re21_s11 + Thrombin*default/kmc_re21_s9);
    vmaf_re21 = 1 mole_per_second; kmc_re21_s11 = 1 substance; vmar_re21 = 1 mole_per_second; kmc_re21_s9 = 1 substance;
  re22: Thrombin => PAR_1; (vmaf_re22/kmc_re22_s9*Thrombin*default - vmar_re22/kmc_re22_s16*PAR_1*default)/(1 + Thrombin*default/kmc_re22_s9 + PAR_1*default/kmc_re22_s16);
    vmaf_re22 = 1 mole_per_second; kmc_re22_s9 = 1 substance; vmar_re22 = 1 mole_per_second; kmc_re22_s16 = 1 substance;
  re23: PAR_1 => Fibrinogen; (vmaf_re23/kmc_re23_s16*PAR_1*default - vmar_re23/kmc_re23_s17*Fibrinogen*default)/(1 + PAR_1*default/kmc_re23_s16 + Fibrinogen*default/kmc_re23_s17);
    vmaf_re23 = 1 mole_per_second; kmc_re23_s16 = 1 substance; vmar_re23 = 1 mole_per_second; kmc_re23_s17 = 1 substance;
  re24: Fibrinogen + Factor_XIII => Fibrin; (vmaf_re24/(kic_re24_s17*kmc_re24_s38)*Fibrinogen*default*Factor_XIII*default - vmar_re24/kmc_re24_s18*Fibrin*default)/(1 + Fibrin*default/kmc_re24_s18 + Fibrinogen*default/kic_re24_s17 + Fibrinogen*default*Factor_XIII*default/(kic_re24_s17*kmc_re24_s38) + Factor_XIII*default/kic_re24_s38);
    vmaf_re24 = 1 mole_per_second; vmar_re24 = 1 mole_per_second; kmc_re24_s38 = 1 substance; kmc_re24_s18 = 1 substance; kic_re24_s17 = 1 substance; kic_re24_s38 = 1 substance;
  re25: Fibrin => Platelets; (vmaf_re25/kmc_re25_s18*Fibrin*default - vmar_re25/kmc_re25_s11*Platelets*default)/(1 + Fibrin*default/kmc_re25_s18 + Platelets*default/kmc_re25_s11);
    vmaf_re25 = 1 mole_per_second; kmc_re25_s18 = 1 substance; vmar_re25 = 1 mole_per_second; kmc_re25_s11 = 1 substance;
  re26: Fibrin => Clot_stabilization; (vmaf_re26/kmc_re26_s18*Fibrin*default - vmar_re26/kmc_re26_s19*Clot_stabilization*default)/(1 + Fibrin*default/kmc_re26_s18 + Clot_stabilization*default/kmc_re26_s19);
    vmaf_re26 = 1 mole_per_second; kmc_re26_s18 = 1 substance; vmar_re26 = 1 mole_per_second; kmc_re26_s19 = 1 substance;
  re27: PHD_enzymes => Hydroxylation; (vmaf_re27/kmc_re27_s21*PHD_enzymes*default - vmar_re27/kmc_re27_s22*Hydroxylation*default)/(1 + Hypoxia*default/kic_1_re27_s20 + (PHD_enzymes*default/kmc_re27_s21 + Hydroxylation*default/kmc_re27_s22)*(1 + Hypoxia*default/kic_2_re27_s20));  // modifiers: Hypoxia
    vmaf_re27 = 1 mole_per_second; kmc_re27_s21 = 1 substance; vmar_re27 = 1 mole_per_second; kmc_re27_s22 = 1 substance; kic_1_re27_s20 = 1 substance; kic_2_re27_s20 = 1 substance;
  re28: Hypoxia => HIF; (vmaf_re28/kmc_re28_s20*Hypoxia*default - vmar_re28/kmc_re28_s23*HIF*default)/(1 + Hypoxia*default/kmc_re28_s20 + HIF*default/kmc_re28_s23);
    vmaf_re28 = 1 mole_per_second; kmc_re28_s20 = 1 substance; vmar_re28 = 1 mole_per_second; kmc_re28_s23 = 1 substance;
  re29: HIF => HRE; (vmaf_re29/kmc_re29_s23*HIF*default - vmar_re29/kmc_re29_s24*HRE*default)/(1 + HIF*default/kmc_re29_s23 + HRE*default/kmc_re29_s24);
    vmaf_re29 = 1 mole_per_second; kmc_re29_s23 = 1 substance; vmar_re29 = 1 mole_per_second; kmc_re29_s24 = 1 substance;
  re30: HIF => PAI_1; (vmaf_re30/kmc_re30_s23*HIF*default - vmar_re30/kmc_re30_s25*PAI_1*default)/(1 + HIF*default/kmc_re30_s23 + PAI_1*default/kmc_re30_s25);
    vmaf_re30 = 1 mole_per_second; kmc_re30_s23 = 1 substance; vmar_re30 = 1 mole_per_second; kmc_re30_s25 = 1 substance;
  re31: Platelets + PAR_1 + Thrombin + Inflammatiory_mediators => Aggregation; (vmaf_re31*(Platelets*default/kmc_re31_s11)^hco_re31*(PAR_1*default/kmc_re31_s16)^hco_re31*(Thrombin*default/kmc_re31_s9)^hco_re31*(Inflammatiory_mediators*default/kmc_re31_s13)^hco_re31 - vmar_re31*(Aggregation*default/kmc_re31_s26)^hco_re31)/((1 + Platelets*default/kmc_re31_s11)^hco_re31*(1 + PAR_1*default/kmc_re31_s16)^hco_re31*(1 + Thrombin*default/kmc_re31_s9)^hco_re31*(1 + Inflammatiory_mediators*default/kmc_re31_s13)^hco_re31 + (1 + Aggregation*default/kmc_re31_s26)^hco_re31 - 1);
    vmaf_re31 = 1 mole_per_second; hco_re31 = 1 dimensionless; kmc_re31_s11 = 1 substance; kmc_re31_s16 = 1 substance; kmc_re31_s9 = 1 substance; kmc_re31_s13 = 1 substance; vmar_re31 = 1 mole_per_second; kmc_re31_s26 = 1 substance;
  re32: Fibrin => Thrombosis; (vmaf_re32/kmc_re32_s18*Fibrin*default - vmar_re32/kmc_re32_s28*Thrombosis*default)/(1 + Fibrin*default/kmc_re32_s18 + Thrombosis*default/kmc_re32_s28);
    vmaf_re32 = 1 mole_per_second; kmc_re32_s18 = 1 substance; vmar_re32 = 1 mole_per_second; kmc_re32_s28 = 1 substance;
  re33: Aggregation => Thrombin; (vmaf_re33/kmc_re33_s26*Aggregation*default - vmar_re33/kmc_re33_s9*Thrombin*default)/(1 + Aggregation*default/kmc_re33_s26 + Thrombin*default/kmc_re33_s9);
    vmaf_re33 = 1 mole_per_second; kmc_re33_s26 = 1 substance; vmar_re33 = 1 mole_per_second; kmc_re33_s9 = 1 substance;
  re34: PAI_1 => Thrombosis; (vmaf_re34/kmc_re34_s25*PAI_1*default - vmar_re34/kmc_re34_s28*Thrombosis*default)/(1 + Activated_Protein_C*default/kic_1_re34_s41 + (PAI_1*default/kmc_re34_s25 + Thrombosis*default/kmc_re34_s28)*(1 + Activated_Protein_C*default/kic_2_re34_s41));  // modifiers: Activated_Protein_C
    vmaf_re34 = 1 mole_per_second; kmc_re34_s25 = 1 substance; vmar_re34 = 1 mole_per_second; kmc_re34_s28 = 1 substance; kic_1_re34_s41 = 1 substance; kic_2_re34_s41 = 1 substance;
  re35: HIF => EGR_1; (vmaf_re35/kmc_re35_s23*HIF*default - vmar_re35/kmc_re35_s29*EGR_1*default)/(1 + HIF*default/kmc_re35_s23 + EGR_1*default/kmc_re35_s29);
    vmaf_re35 = 1 mole_per_second; kmc_re35_s23 = 1 substance; vmar_re35 = 1 mole_per_second; kmc_re35_s29 = 1 substance;
  re36: EGR_1 => Thrombosis; (vmaf_re36/kmc_re36_s29*EGR_1*default - vmar_re36/kmc_re36_s28*Thrombosis*default)/(1 + EGR_1*default/kmc_re36_s29 + Thrombosis*default/kmc_re36_s28);
    vmaf_re36 = 1 mole_per_second; kmc_re36_s29 = 1 substance; vmar_re36 = 1 mole_per_second; kmc_re36_s28 = 1 substance;
  re37: Hypoxia => Inflammatiory_mediators; (vmaf_re37/kmc_re37_s20*Hypoxia*default - vmar_re37/kmc_re37_s13*Inflammatiory_mediators*default)/(1 + Hypoxia*default/kmc_re37_s20 + Inflammatiory_mediators*default/kmc_re37_s13);
    vmaf_re37 = 1 mole_per_second; kmc_re37_s20 = 1 substance; vmar_re37 = 1 mole_per_second; kmc_re37_s13 = 1 substance;
  re39: Thrombosis => Inflammatiory_mediators; (vmaf_re39/kmc_re39_s28*Thrombosis*default - vmar_re39/kmc_re39_s13*Inflammatiory_mediators*default)/(1 + Thrombosis*default/kmc_re39_s28 + Inflammatiory_mediators*default/kmc_re39_s13);
    vmaf_re39 = 1 mole_per_second; kmc_re39_s28 = 1 substance; vmar_re39 = 1 mole_per_second; kmc_re39_s13 = 1 substance;
  re40: Inflammatiory_mediators => PAI_1; (vmaf_re40/kmc_re40_s13*Inflammatiory_mediators*default - vmar_re40/kmc_re40_s25*PAI_1*default)/(1 + Inflammatiory_mediators*default/kmc_re40_s13 + PAI_1*default/kmc_re40_s25);
    vmaf_re40 = 1 mole_per_second; kmc_re40_s13 = 1 substance; vmar_re40 = 1 mole_per_second; kmc_re40_s25 = 1 substance;
  re41: Inflammatiory_mediators => Fibrinogen; (vmaf_re41/kmc_re41_s13*Inflammatiory_mediators*default - vmar_re41/kmc_re41_s17*Fibrinogen*default)/(1 + Inflammatiory_mediators*default/kmc_re41_s13 + Fibrinogen*default/kmc_re41_s17);
    vmaf_re41 = 1 mole_per_second; kmc_re41_s13 = 1 substance; vmar_re41 = 1 mole_per_second; kmc_re41_s17 = 1 substance;
  re42: Leukocyte => Tissue_factor; (vmaf_re42/kmc_re42_s35*Leukocyte*default - vmar_re42/kmc_re42_s36*Tissue_factor*default)/(1 + Leukocyte*default/kmc_re42_s35 + Tissue_factor*default/kmc_re42_s36);
    vmaf_re42 = 1 mole_per_second; kmc_re42_s35 = 1 substance; vmar_re42 = 1 mole_per_second; kmc_re42_s36 = 1 substance;
  re43: Tissue_factor => Thrombin; (vmaf_re43/kmc_re43_s36*Tissue_factor*default - vmar_re43/kmc_re43_s9*Thrombin*default)/(1 + Tissue_factor*default/kmc_re43_s36 + Thrombin*default/kmc_re43_s9);
    vmaf_re43 = 1 mole_per_second; kmc_re43_s36 = 1 substance; vmar_re43 = 1 mole_per_second; kmc_re43_s9 = 1 substance;
  re44: von_Willebrand_factor => Platelets; (vmaf_re44/kmc_re44_s37*von_Willebrand_factor*default - vmar_re44/kmc_re44_s11*Platelets*default)/(1 + von_Willebrand_factor*default/kmc_re44_s37 + Platelets*default/kmc_re44_s11);
    vmaf_re44 = 1 mole_per_second; kmc_re44_s37 = 1 substance; vmar_re44 = 1 mole_per_second; kmc_re44_s11 = 1 substance;
  re45: Inflammatiory_mediators => von_Willebrand_factor; (vmaf_re45/kmc_re45_s13*Inflammatiory_mediators*default - vmar_re45/kmc_re45_s37*von_Willebrand_factor*default)/(1 + Inflammatiory_mediators*default/kmc_re45_s13 + von_Willebrand_factor*default/kmc_re45_s37);
    vmaf_re45 = 1 mole_per_second; kmc_re45_s13 = 1 substance; vmar_re45 = 1 mole_per_second; kmc_re45_s37 = 1 substance;
  re46: von_Willebrand_factor => Tissue_factor; (vmaf_re46/kmc_re46_s37*von_Willebrand_factor*default - vmar_re46/kmc_re46_s36*Tissue_factor*default)/(1 + von_Willebrand_factor*default/kmc_re46_s37 + Tissue_factor*default/kmc_re46_s36);
    vmaf_re46 = 1 mole_per_second; kmc_re46_s37 = 1 substance; vmar_re46 = 1 mole_per_second; kmc_re46_s36 = 1 substance;
  re47: Thrombin => FV; (vmaf_re47/kmc_re47_s9*Thrombin*default - vmar_re47/kmc_re47_s39*FV*default)/(1 + Thrombin*default/kmc_re47_s9 + FV*default/kmc_re47_s39);
    vmaf_re47 = 1 mole_per_second; kmc_re47_s9 = 1 substance; vmar_re47 = 1 mole_per_second; kmc_re47_s39 = 1 substance;
  re48: Thrombin => FVIII; (vmaf_re48/kmc_re48_s9*Thrombin*default - vmar_re48/kmc_re48_s40*FVIII*default)/(1 + Thrombin*default/kmc_re48_s9 + FVIII*default/kmc_re48_s40);
    vmaf_re48 = 1 mole_per_second; kmc_re48_s9 = 1 substance; vmar_re48 = 1 mole_per_second; kmc_re48_s40 = 1 substance;
  re49: FV => Thrombin; (vmaf_re49/kmc_re49_s39*FV*default - vmar_re49/kmc_re49_s9*Thrombin*default)/(1 + Activated_Protein_C*default/kic_1_re49_s41 + (FV*default/kmc_re49_s39 + Thrombin*default/kmc_re49_s9)*(1 + Activated_Protein_C*default/kic_2_re49_s41));  // modifiers: Activated_Protein_C
    vmaf_re49 = 1 mole_per_second; kmc_re49_s39 = 1 substance; vmar_re49 = 1 mole_per_second; kmc_re49_s9 = 1 substance; kic_1_re49_s41 = 1 substance; kic_2_re49_s41 = 1 substance;
  re50: FVIII => Thrombin; (vmaf_re50/kmc_re50_s40*FVIII*default - vmar_re50/kmc_re50_s9*Thrombin*default)/(1 + Activated_Protein_C*default/kic_1_re50_s41 + (FVIII*default/kmc_re50_s40 + Thrombin*default/kmc_re50_s9)*(1 + Activated_Protein_C*default/kic_2_re50_s41));  // modifiers: Activated_Protein_C
    vmaf_re50 = 1 mole_per_second; kmc_re50_s40 = 1 substance; vmar_re50 = 1 mole_per_second; kmc_re50_s9 = 1 substance; kic_1_re50_s41 = 1 substance; kic_2_re50_s41 = 1 substance;
  re51: Protein_C => Activated_Protein_C; (vmaf_re51/kmc_re51_s42*Protein_C*default - vmar_re51/kmc_re51_s41*Activated_Protein_C*default)/(1 + Protein_C*default/kmc_re51_s42 + Activated_Protein_C*default/kmc_re51_s41);
    vmaf_re51 = 1 mole_per_second; kmc_re51_s42 = 1 substance; vmar_re51 = 1 mole_per_second; kmc_re51_s41 = 1 substance;
  re52: Thrombin + Thrombomodulin + EPCR => Protein_C; (vmaf_re52*(Thrombin*default/kmc_re52_s9)^hco_re52*(Thrombomodulin*default/kmc_re52_s44)^hco_re52*(EPCR*default/kmc_re52_s43)^hco_re52 - vmar_re52*(Protein_C*default/kmc_re52_s42)^hco_re52)/((1 + Thrombin*default/kmc_re52_s9)^hco_re52*(1 + Thrombomodulin*default/kmc_re52_s44)^hco_re52*(1 + EPCR*default/kmc_re52_s43)^hco_re52 + (1 + Protein_C*default/kmc_re52_s42)^hco_re52 - 1);
    vmaf_re52 = 1 mole_per_second; hco_re52 = 1 dimensionless; kmc_re52_s9 = 1 substance; kmc_re52_s44 = 1 substance; kmc_re52_s43 = 1 substance; vmar_re52 = 1 mole_per_second; kmc_re52_s42 = 1 substance;
  re53: Infection => Inflammatiory_mediators; (vmaf_re53/kmc_re53_s45*Infection*default - vmar_re53/kmc_re53_s13*Inflammatiory_mediators*default)/(1 + Infection*default/kmc_re53_s45 + Inflammatiory_mediators*default/kmc_re53_s13);
    vmaf_re53 = 1 mole_per_second; kmc_re53_s45 = 1 substance; vmar_re53 = 1 mole_per_second; kmc_re53_s13 = 1 substance;

  // Unit definitions:
  unit substance = mole;
  unit volume = litre;
  unit area = metre^2;
  unit length = metre;
  unit time = second;
  unit mole_per_second = mole / second;
end
